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/batch
! ANSYS input file written by Workbench version 2026 R1
! File used for geometry attach: D:\6th sem\FEA\project\FEA Proeject (~recovered).step
/title,wing_fea_corrected--Modal (C5)
/com,--- Data in consistent MKS units. See Solving Units in the help system for more information.
/units,MKS
/prep7
! Turn off shape checking because checks already performed inside WB mesher.
! See help system for more information.
SHPP,OFF,,NOWARN
etcon,set             ! allow ANSYS to choose best KEYOP's for 180x elements, resets any applicable keyopt to MAPDL defaults
/com,*********** Send User Defined Coordinate System(s) ***********
csys,0
/com,*********** Nodes for the whole assembly ***********
nblock,3,,16506
(1i9,3e20.9e3)
     6628     1.582503311E-01     1.098409000E-01     2.720021958E-03
     6629     1.455448217E-01     1.098409000E-01     6.016685480E-04
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-1
/com,*********** Elements for Body 1 'FEA Proeject (v4~recovered)|Wing_body' ***********
et,1,181
keyo,1,1,0          ! bending and membrane stiffness
keyo,1,3,2
MAT,1 $ TYPE,1 $ REAL,1 $ SECNUM,1 $ ESYS,0    ! ELEMNODES = 4
eblock,21,COMPACT,,12870
(21i9)
    16507    20724    20713    16055    16055
    16508    20494    20306    15018    15018
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-1
secnum,1    ! reset the section ID to default
/com,*********** Elements for Body 2 'FEA Proeject (v4~recovered)|Body44' ***********
et,2,181
keyo,2,1,0          ! bending and membrane stiffness
keyo,2,3,2
MAT,2 $ TYPE,2 $ REAL,2 $ SECNUM,2 $ ESYS,0    ! ELEMNODES = 4
eblock,21,COMPACT,,62
(21i9)
    29401    21527    21514    21507    21507
    29402    21509    21508    21510    21510
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-1
secnum,1    ! reset the section ID to default
/com,*********** Elements for Body 3 'FEA Proeject (v4~recovered)|Body45' ***********
et,3,181
keyo,3,1,0          ! bending and membrane stiffness
keyo,3,3,2
MAT,3 $ TYPE,3 $ REAL,3 $ SECNUM,3 $ ESYS,0    ! ELEMNODES = 4
eblock,21,COMPACT,,37
(21i9)
    29453    21624    21589    21618    21618
    29460    21594    21593    21587    21587
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-1
secnum,1    ! reset the section ID to default
/com,*********** Elements for Body 4 'FEA Proeject (v4~recovered)|Rib1' ***********
et,4,186
keyo,4,2,1          ! set full integration on SOLID186
MAT,4 $ TYPE,4 $ REAL,4 $ SECNUM,4 $ ESYS,0    ! ELEMNODES = 20
eblock,21,COMPACT,,59
(21i9)
    12970     6628     6659     6630     6629     6691     6660     6689     6690     6797     6806     6801     6796     6912     6911     6988     6990     6798     6909     6807     6803
    12971     6630     6659     6788     6787     6689     6660     6734     6733     6806     6910     7156     6808     6911     6913     7084     6989     6807     6909     7087     7085
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-1
secnum,1    ! reset the section ID to default
/com,*********** Elements for Body 5 'FEA Proeject (v4~recovered)|rib2' ***********
et,5,186
keyo,5,2,1          ! set full integration on SOLID186
MAT,5 $ TYPE,5 $ REAL,5 $ SECNUM,5 $ ESYS,0    ! ELEMNODES = 20
eblock,21,COMPACT,,57
(21i9)
    13029     7228     7229     7266     7267     7280     7281     7318     7319     7527     7531     7605     7528     7631     7634     7671     7632     7529     7532     7606     7608
    13030     7167     7193     7192     7168     7220     7194     7195     7219     7339     7429     7343     7338     7435     7434     7439     7501     7340     7432     7430     7344
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-1
secnum,1    ! reset the section ID to default
/com,*********** Elements for Body 6 'FEA Proeject (v4~recovered)|rib3' ***********
et,6,186
keyo,6,2,1          ! set full integration on SOLID186
MAT,6 $ TYPE,6 $ REAL,6 $ SECNUM,6 $ ESYS,0    ! ELEMNODES = 20
eblock,21,COMPACT,,55
(21i9)
    13086     7680     7694     7799     7798     7733     7719     7747     7746     7857     7912     8150     7859     7984     7985     8049     8017     7858     7911     8052     8050
    13087     7680     7681     7682     7694     7733     7732     7731     7719     7856     7860     7864     7857     8013     8011     7983     7984     7858     7861     7865     7911
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-1
secnum,1    ! reset the section ID to default
/com,*********** Elements for Body 7 'FEA Proeject (v4~recovered)|rib4' ***********
et,7,186
keyo,7,2,1          ! set full integration on SOLID186
MAT,7 $ TYPE,7 $ REAL,7 $ SECNUM,7 $ ESYS,0    ! ELEMNODES = 20
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/com,*********** Elements for Body 8 'FEA Proeject (v4~recovered)|rib5' ***********
et,8,186
keyo,8,2,1          ! set full integration on SOLID186
MAT,8 $ TYPE,8 $ REAL,8 $ SECNUM,8 $ ESYS,0    ! ELEMNODES = 20
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/com,*********** Elements for Body 9 'FEA Proeject (v4~recovered)|rib6' ***********
et,9,186
keyo,9,2,1          ! set full integration on SOLID186
MAT,9 $ TYPE,9 $ REAL,9 $ SECNUM,9 $ ESYS,0    ! ELEMNODES = 20
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/com,*********** Elements for Body 10 'FEA Proeject (v4~recovered)|rib7' ***********
et,10,186
keyo,10,2,1         ! set full integration on SOLID186
MAT,10 $ TYPE,10 $ REAL,10 $ SECNUM,10 $ ESYS,0    ! ELEMNODES = 20
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/com,*********** Elements for Body 11 'FEA Proeject (v4~recovered)|rib8' ***********
et,11,186
keyo,11,2,1         ! set full integration on SOLID186
MAT,11 $ TYPE,11 $ REAL,11 $ SECNUM,11 $ ESYS,0    ! ELEMNODES = 20
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/com,*********** Elements for Body 12 'FEA Proeject (v4~recovered)|rib9' ***********
et,12,186
keyo,12,2,1         ! set full integration on SOLID186
MAT,12 $ TYPE,12 $ REAL,12 $ SECNUM,12 $ ESYS,0    ! ELEMNODES = 20
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/com,*********** Elements for Body 13 'FEA Proeject (v4~recovered)|rib10' ***********
et,13,186
keyo,13,2,1         ! set full integration on SOLID186
MAT,13 $ TYPE,13 $ REAL,13 $ SECNUM,13 $ ESYS,0    ! ELEMNODES = 20
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/com,*********** Elements for Body 14 'FEA Proeject (v4~recovered)|spar1' ***********
et,14,186
keyo,14,2,1         ! set full integration on SOLID186
MAT,14 $ TYPE,14 $ REAL,14 $ SECNUM,14 $ ESYS,0    ! ELEMNODES = 20
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/com,*********** Elements for Body 15 'FEA Proeject (v4~recovered)|spar2' ***********
et,15,186
keyo,15,2,1         ! set full integration on SOLID186
MAT,15 $ TYPE,15 $ REAL,15 $ SECNUM,15 $ ESYS,0    ! ELEMNODES = 20
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toffst,273.15,      ! Temperature offset from absolute zero
/com,*********** Set Reference Temperature ***********
tref,22.
/com,*********** Send Materials ***********
MP,EX,1,70000000000,	! Pa
MP,NUXY,1,0.33,
MP,DENS,1,2700,	! kg m^-3

MP,EX,2,70000000000,	! Pa
MP,NUXY,2,0.33,
MP,DENS,2,2700,	! kg m^-3

MP,EX,3,70000000000,	! Pa
MP,NUXY,3,0.33,
MP,DENS,3,2700,	! kg m^-3

MP,EX,4,70000000000,	! Pa
MP,NUXY,4,0.33,
MP,DENS,4,2700,	! kg m^-3

MP,EX,5,70000000000,	! Pa
MP,NUXY,5,0.33,
MP,DENS,5,2700,	! kg m^-3

MP,EX,6,70000000000,	! Pa
MP,NUXY,6,0.33,
MP,DENS,6,2700,	! kg m^-3

MP,EX,7,70000000000,	! Pa
MP,NUXY,7,0.33,
MP,DENS,7,2700,	! kg m^-3

MP,EX,8,70000000000,	! Pa
MP,NUXY,8,0.33,
MP,DENS,8,2700,	! kg m^-3

MP,EX,9,70000000000,	! Pa
MP,NUXY,9,0.33,
MP,DENS,9,2700,	! kg m^-3

MP,EX,10,70000000000,	! Pa
MP,NUXY,10,0.33,
MP,DENS,10,2700,	! kg m^-3

MP,EX,11,70000000000,	! Pa
MP,NUXY,11,0.33,
MP,DENS,11,2700,	! kg m^-3

MP,EX,12,70000000000,	! Pa
MP,NUXY,12,0.33,
MP,DENS,12,2700,	! kg m^-3

MP,EX,13,70000000000,	! Pa
MP,NUXY,13,0.33,
MP,DENS,13,2700,	! kg m^-3

MP,EX,14,70000000000,	! Pa
MP,NUXY,14,0.33,
MP,DENS,14,2700,	! kg m^-3

MP,EX,15,70000000000,	! Pa
MP,NUXY,15,0.33,
MP,DENS,15,2700,	! kg m^-3

/com,*********** Send Sheet Properties ***********
sectype,1,shell
secdata,8.e-003
secoff,mid

sectype,2,shell
secdata,1.e-004
secoff,mid

sectype,3,shell
secdata,1.e-004
secoff,mid

!************************* Model Summary ********************
! FEA Proeject (v4~recovered)|Wing_body,	Aluminium aAlloy,	matid,	1
! FEA Proeject (v4~recovered)|Body44,	Aluminium aAlloy,	matid,	2
! FEA Proeject (v4~recovered)|Body45,	Aluminium aAlloy,	matid,	3
! FEA Proeject (v4~recovered)|Rib1,	Aluminium aAlloy,	matid,	4
! FEA Proeject (v4~recovered)|rib2,	Aluminium aAlloy,	matid,	5
! FEA Proeject (v4~recovered)|rib3,	Aluminium aAlloy,	matid,	6
! FEA Proeject (v4~recovered)|rib4,	Aluminium aAlloy,	matid,	7
! FEA Proeject (v4~recovered)|rib5,	Aluminium aAlloy,	matid,	8
! FEA Proeject (v4~recovered)|rib6,	Aluminium aAlloy,	matid,	9
! FEA Proeject (v4~recovered)|rib7,	Aluminium aAlloy,	matid,	10
! FEA Proeject (v4~recovered)|rib8,	Aluminium aAlloy,	matid,	11
! FEA Proeject (v4~recovered)|rib9,	Aluminium aAlloy,	matid,	12
! FEA Proeject (v4~recovered)|rib10,	Aluminium aAlloy,	matid,	13
! FEA Proeject (v4~recovered)|spar1,	Aluminium aAlloy,	matid,	14
! FEA Proeject (v4~recovered)|spar2,	Aluminium aAlloy,	matid,	15
!************************* End Model Summary ********************
/com,*********** Create Contact "Contact Region" ***********
*set,tid,17
*set,cid,16
r,tid
r,cid
et,tid,170
et,cid,174
MAT,17 $ TYPE,17 $ REAL,17 $ SECNUM,17 $ ESYS,0    ! ELEMNODES = 4
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MAT,16 $ TYPE,16 $ REAL,16 $ SECNUM,16 $ ESYS,0    ! ELEMNODES = 4
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MAT,16 $ TYPE,16 $ REAL,17 $ SECNUM,16 $ ESYS,0    ! ELEMNODES = 8
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MAT,17 $ TYPE,17 $ REAL,16 $ SECNUM,17 $ ESYS,0    ! ELEMNODES = 8
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keyo,cid,8,2               ! auto create asymmetric contact (from Program Controlled setting)
keyo,cid,10,0              ! adjust contact stiffness each NR iteration (from Program Controlled setting)
keyo,cid,12,5              ! bonded always
keyo,cid,18,1              ! small sliding turned on by application
keyo,cid,2,2               ! MPC for bonded contacts (from Program Controlled setting)
keyo,tid,5,4               ! Force Distributed Constraint, All Directions
keyo,cid,4,2               ! on nodal point - normal to target surface (from Program Controlled setting)
keyo,cid,9,1               ! ignore initial gaps/penetration
keyo,cid,7,0               ! No Prediction
rmod,tid,3,10.      ! FKN
rmod,tid,5,0.       ! ICONT
rmod,tid,6,-3.06534120792262e-003       ! PINB
rmod,tid,10,0.      ! CNOF
rmod,tid,12,0.      ! FKT
rmod,tid,36,145     ! WB DSID
rmod,cid,3,10.      ! FKN
rmod,cid,5,0.       ! ICONT
rmod,cid,6,-3.06534120792262e-003       ! PINB
rmod,cid,10,0.      ! CNOF
rmod,cid,12,0.      ! FKT
rmod,cid,36,145     ! WB DSID
/com,*********** Create Contact "Contact Region 2" ***********
*set,tid,19
*set,cid,18
r,tid
r,cid
et,tid,170
et,cid,174
MAT,19 $ TYPE,19 $ REAL,19 $ SECNUM,19 $ ESYS,0    ! ELEMNODES = 4
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MAT,18 $ TYPE,18 $ REAL,18 $ SECNUM,18 $ ESYS,0    ! ELEMNODES = 4
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MAT,18 $ TYPE,18 $ REAL,19 $ SECNUM,18 $ ESYS,0    ! ELEMNODES = 8
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MAT,19 $ TYPE,19 $ REAL,18 $ SECNUM,19 $ ESYS,0    ! ELEMNODES = 8
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keyo,cid,8,2               ! auto create asymmetric contact (from Program Controlled setting)
keyo,cid,10,0              ! adjust contact stiffness each NR iteration (from Program Controlled setting)
keyo,cid,12,5              ! bonded always
keyo,cid,18,1              ! small sliding turned on by application
keyo,cid,2,2               ! MPC for bonded contacts (from Program Controlled setting)
keyo,tid,5,4               ! Force Distributed Constraint, All Directions
keyo,cid,4,2               ! on nodal point - normal to target surface (from Program Controlled setting)
keyo,cid,9,1               ! ignore initial gaps/penetration
keyo,cid,7,0               ! No Prediction
rmod,tid,3,10.      ! FKN
rmod,tid,5,0.       ! ICONT
rmod,tid,6,-3.06534120792262e-003       ! PINB
rmod,tid,10,0.      ! CNOF
rmod,tid,12,0.      ! FKT
rmod,tid,36,148     ! WB DSID
rmod,cid,3,10.      ! FKN
rmod,cid,5,0.       ! ICONT
rmod,cid,6,-3.06534120792262e-003       ! PINB
rmod,cid,10,0.      ! CNOF
rmod,cid,12,0.      ! FKT
rmod,cid,36,148     ! WB DSID
/com,*********** Create Contact "Contact Region 3" ***********
*set,tid,21
*set,cid,20
r,tid
r,cid
et,tid,170
et,cid,174
MAT,21 $ TYPE,21 $ REAL,21 $ SECNUM,21 $ ESYS,0    ! ELEMNODES = 4
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MAT,20 $ TYPE,20 $ REAL,20 $ SECNUM,20 $ ESYS,0    ! ELEMNODES = 4
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MAT,20 $ TYPE,20 $ REAL,21 $ SECNUM,20 $ ESYS,0    ! ELEMNODES = 8
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MAT,21 $ TYPE,21 $ REAL,20 $ SECNUM,21 $ ESYS,0    ! ELEMNODES = 8
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keyo,cid,8,2               ! auto create asymmetric contact (from Program Controlled setting)
keyo,cid,10,0              ! adjust contact stiffness each NR iteration (from Program Controlled setting)
keyo,cid,12,5              ! bonded always
keyo,cid,18,1              ! small sliding turned on by application
keyo,cid,2,2               ! MPC for bonded contacts (from Program Controlled setting)
keyo,tid,5,4               ! Force Distributed Constraint, All Directions
keyo,cid,4,2               ! on nodal point - normal to target surface (from Program Controlled setting)
keyo,cid,9,1               ! ignore initial gaps/penetration
keyo,cid,7,0               ! No Prediction
rmod,tid,3,10.      ! FKN
rmod,tid,5,0.       ! ICONT
rmod,tid,6,-3.06534120792262e-003       ! PINB
rmod,tid,10,0.      ! CNOF
rmod,tid,12,0.      ! FKT
rmod,tid,36,151     ! WB DSID
rmod,cid,3,10.      ! FKN
rmod,cid,5,0.       ! ICONT
rmod,cid,6,-3.06534120792262e-003       ! PINB
rmod,cid,10,0.      ! CNOF
rmod,cid,12,0.      ! FKT
rmod,cid,36,151     ! WB DSID
/com,*********** Create Contact "Contact Region 4" ***********
*set,tid,23
*set,cid,22
r,tid
r,cid
et,tid,170
et,cid,174
MAT,23 $ TYPE,23 $ REAL,23 $ SECNUM,23 $ ESYS,0    ! ELEMNODES = 4
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MAT,22 $ TYPE,22 $ REAL,22 $ SECNUM,22 $ ESYS,0    ! ELEMNODES = 4
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MAT,22 $ TYPE,22 $ REAL,23 $ SECNUM,22 $ ESYS,0    ! ELEMNODES = 8
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MAT,23 $ TYPE,23 $ REAL,22 $ SECNUM,23 $ ESYS,0    ! ELEMNODES = 8
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keyo,cid,8,2               ! auto create asymmetric contact (from Program Controlled setting)
keyo,cid,10,0              ! adjust contact stiffness each NR iteration (from Program Controlled setting)
keyo,cid,12,5              ! bonded always
keyo,cid,18,1              ! small sliding turned on by application
keyo,cid,2,2               ! MPC for bonded contacts (from Program Controlled setting)
keyo,tid,5,4               ! Force Distributed Constraint, All Directions
keyo,cid,4,2               ! on nodal point - normal to target surface (from Program Controlled setting)
keyo,cid,9,1               ! ignore initial gaps/penetration
keyo,cid,7,0               ! No Prediction
rmod,tid,3,10.      ! FKN
rmod,tid,5,0.       ! ICONT
rmod,tid,6,-3.06534120792262e-003       ! PINB
rmod,tid,10,0.      ! CNOF
rmod,tid,12,0.      ! FKT
rmod,tid,36,154     ! WB DSID
rmod,cid,3,10.      ! FKN
rmod,cid,5,0.       ! ICONT
rmod,cid,6,-3.06534120792262e-003       ! PINB
rmod,cid,10,0.      ! CNOF
rmod,cid,12,0.      ! FKT
rmod,cid,36,154     ! WB DSID
/com,*********** Create Contact "Contact Region 5" ***********
*set,tid,25
*set,cid,24
r,tid
r,cid
et,tid,170
et,cid,174
MAT,25 $ TYPE,25 $ REAL,25 $ SECNUM,25 $ ESYS,0    ! ELEMNODES = 4
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MAT,24 $ TYPE,24 $ REAL,24 $ SECNUM,24 $ ESYS,0    ! ELEMNODES = 4
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MAT,24 $ TYPE,24 $ REAL,25 $ SECNUM,24 $ ESYS,0    ! ELEMNODES = 8
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MAT,25 $ TYPE,25 $ REAL,24 $ SECNUM,25 $ ESYS,0    ! ELEMNODES = 8
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keyo,cid,8,2               ! auto create asymmetric contact (from Program Controlled setting)
keyo,cid,10,0              ! adjust contact stiffness each NR iteration (from Program Controlled setting)
keyo,cid,12,5              ! bonded always
keyo,cid,18,1              ! small sliding turned on by application
keyo,cid,2,2               ! MPC for bonded contacts (from Program Controlled setting)
keyo,tid,5,4               ! Force Distributed Constraint, All Directions
keyo,cid,4,2               ! on nodal point - normal to target surface (from Program Controlled setting)
keyo,cid,9,1               ! ignore initial gaps/penetration
keyo,cid,7,0               ! No Prediction
rmod,tid,3,10.      ! FKN
rmod,tid,5,0.       ! ICONT
rmod,tid,6,-3.06534120792262e-003       ! PINB
rmod,tid,10,0.      ! CNOF
rmod,tid,12,0.      ! FKT
rmod,tid,36,157     ! WB DSID
rmod,cid,3,10.      ! FKN
rmod,cid,5,0.       ! ICONT
rmod,cid,6,-3.06534120792262e-003       ! PINB
rmod,cid,10,0.      ! CNOF
rmod,cid,12,0.      ! FKT
rmod,cid,36,157     ! WB DSID
/com,*********** Create Contact "Contact Region 6" ***********
*set,tid,27
*set,cid,26
r,tid
r,cid
et,tid,170
et,cid,174
MAT,27 $ TYPE,27 $ REAL,27 $ SECNUM,27 $ ESYS,0    ! ELEMNODES = 4
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MAT,26 $ TYPE,26 $ REAL,26 $ SECNUM,26 $ ESYS,0    ! ELEMNODES = 4
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MAT,26 $ TYPE,26 $ REAL,27 $ SECNUM,26 $ ESYS,0    ! ELEMNODES = 8
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MAT,27 $ TYPE,27 $ REAL,26 $ SECNUM,27 $ ESYS,0    ! ELEMNODES = 8
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keyo,cid,8,2               ! auto create asymmetric contact (from Program Controlled setting)
keyo,cid,10,0              ! adjust contact stiffness each NR iteration (from Program Controlled setting)
keyo,cid,12,5              ! bonded always
keyo,cid,18,1              ! small sliding turned on by application
keyo,cid,2,2               ! MPC for bonded contacts (from Program Controlled setting)
keyo,tid,5,4               ! Force Distributed Constraint, All Directions
keyo,cid,4,2               ! on nodal point - normal to target surface (from Program Controlled setting)
keyo,cid,9,1               ! ignore initial gaps/penetration
keyo,cid,7,0               ! No Prediction
rmod,tid,3,10.      ! FKN
rmod,tid,5,0.       ! ICONT
rmod,tid,6,-3.06534120792262e-003       ! PINB
rmod,tid,10,0.      ! CNOF
rmod,tid,12,0.      ! FKT
rmod,tid,36,160     ! WB DSID
rmod,cid,3,10.      ! FKN
rmod,cid,5,0.       ! ICONT
rmod,cid,6,-3.06534120792262e-003       ! PINB
rmod,cid,10,0.      ! CNOF
rmod,cid,12,0.      ! FKT
rmod,cid,36,160     ! WB DSID
/com,*********** Create Contact "Contact Region 7" ***********
*set,tid,29
*set,cid,28
r,tid
r,cid
et,tid,170
et,cid,174
MAT,29 $ TYPE,29 $ REAL,29 $ SECNUM,29 $ ESYS,0    ! ELEMNODES = 4
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MAT,28 $ TYPE,28 $ REAL,28 $ SECNUM,28 $ ESYS,0    ! ELEMNODES = 4
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MAT,28 $ TYPE,28 $ REAL,29 $ SECNUM,28 $ ESYS,0    ! ELEMNODES = 8
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MAT,29 $ TYPE,29 $ REAL,28 $ SECNUM,29 $ ESYS,0    ! ELEMNODES = 8
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keyo,cid,8,2               ! auto create asymmetric contact (from Program Controlled setting)
keyo,cid,10,0              ! adjust contact stiffness each NR iteration (from Program Controlled setting)
keyo,cid,12,5              ! bonded always
keyo,cid,18,1              ! small sliding turned on by application
keyo,cid,2,2               ! MPC for bonded contacts (from Program Controlled setting)
keyo,tid,5,4               ! Force Distributed Constraint, All Directions
keyo,cid,4,2               ! on nodal point - normal to target surface (from Program Controlled setting)
keyo,cid,9,1               ! ignore initial gaps/penetration
keyo,cid,7,0               ! No Prediction
rmod,tid,3,10.      ! FKN
rmod,tid,5,0.       ! ICONT
rmod,tid,6,-3.06534120792262e-003       ! PINB
rmod,tid,10,0.      ! CNOF
rmod,tid,12,0.      ! FKT
rmod,tid,36,163     ! WB DSID
rmod,cid,3,10.      ! FKN
rmod,cid,5,0.       ! ICONT
rmod,cid,6,-3.06534120792262e-003       ! PINB
rmod,cid,10,0.      ! CNOF
rmod,cid,12,0.      ! FKT
rmod,cid,36,163     ! WB DSID
/com,*********** Create Contact "Contact Region 8" ***********
*set,tid,31
*set,cid,30
r,tid
r,cid
et,tid,170
et,cid,174
MAT,31 $ TYPE,31 $ REAL,31 $ SECNUM,31 $ ESYS,0    ! ELEMNODES = 4
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MAT,30 $ TYPE,30 $ REAL,30 $ SECNUM,30 $ ESYS,0    ! ELEMNODES = 4
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MAT,30 $ TYPE,30 $ REAL,31 $ SECNUM,30 $ ESYS,0    ! ELEMNODES = 8
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MAT,31 $ TYPE,31 $ REAL,30 $ SECNUM,31 $ ESYS,0    ! ELEMNODES = 8
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keyo,cid,8,2               ! auto create asymmetric contact (from Program Controlled setting)
keyo,cid,10,0              ! adjust contact stiffness each NR iteration (from Program Controlled setting)
keyo,cid,12,5              ! bonded always
keyo,cid,18,1              ! small sliding turned on by application
keyo,cid,2,2               ! MPC for bonded contacts (from Program Controlled setting)
keyo,tid,5,4               ! Force Distributed Constraint, All Directions
keyo,cid,4,2               ! on nodal point - normal to target surface (from Program Controlled setting)
keyo,cid,9,1               ! ignore initial gaps/penetration
keyo,cid,7,0               ! No Prediction
rmod,tid,3,10.      ! FKN
rmod,tid,5,0.       ! ICONT
rmod,tid,6,-3.06534120792262e-003       ! PINB
rmod,tid,10,0.      ! CNOF
rmod,tid,12,0.      ! FKT
rmod,tid,36,166     ! WB DSID
rmod,cid,3,10.      ! FKN
rmod,cid,5,0.       ! ICONT
rmod,cid,6,-3.06534120792262e-003       ! PINB
rmod,cid,10,0.      ! CNOF
rmod,cid,12,0.      ! FKT
rmod,cid,36,166     ! WB DSID
/com,*********** Create Contact "Contact Region 9" ***********
*set,tid,33
*set,cid,32
r,tid
r,cid
et,tid,170
et,cid,174
MAT,33 $ TYPE,33 $ REAL,33 $ SECNUM,33 $ ESYS,0    ! ELEMNODES = 4
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MAT,32 $ TYPE,32 $ REAL,32 $ SECNUM,32 $ ESYS,0    ! ELEMNODES = 4
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MAT,32 $ TYPE,32 $ REAL,33 $ SECNUM,32 $ ESYS,0    ! ELEMNODES = 8
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MAT,33 $ TYPE,33 $ REAL,32 $ SECNUM,33 $ ESYS,0    ! ELEMNODES = 8
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keyo,cid,8,2               ! auto create asymmetric contact (from Program Controlled setting)
keyo,cid,10,0              ! adjust contact stiffness each NR iteration (from Program Controlled setting)
keyo,cid,12,5              ! bonded always
keyo,cid,18,1              ! small sliding turned on by application
keyo,cid,2,2               ! MPC for bonded contacts (from Program Controlled setting)
keyo,tid,5,4               ! Force Distributed Constraint, All Directions
keyo,cid,4,2               ! on nodal point - normal to target surface (from Program Controlled setting)
keyo,cid,9,1               ! ignore initial gaps/penetration
keyo,cid,7,0               ! No Prediction
rmod,tid,3,10.      ! FKN
rmod,tid,5,0.       ! ICONT
rmod,tid,6,-3.06534120792262e-003       ! PINB
rmod,tid,10,0.      ! CNOF
rmod,tid,12,0.      ! FKT
rmod,tid,36,169     ! WB DSID
rmod,cid,3,10.      ! FKN
rmod,cid,5,0.       ! ICONT
rmod,cid,6,-3.06534120792262e-003       ! PINB
rmod,cid,10,0.      ! CNOF
rmod,cid,12,0.      ! FKT
rmod,cid,36,169     ! WB DSID
/com,*********** Create Contact "Contact Region 10" ***********
*set,tid,35
*set,cid,34
r,tid
r,cid
et,tid,170
et,cid,174
MAT,35 $ TYPE,35 $ REAL,35 $ SECNUM,35 $ ESYS,0    ! ELEMNODES = 4
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MAT,34 $ TYPE,34 $ REAL,34 $ SECNUM,34 $ ESYS,0    ! ELEMNODES = 4
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MAT,34 $ TYPE,34 $ REAL,35 $ SECNUM,34 $ ESYS,0    ! ELEMNODES = 8
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MAT,35 $ TYPE,35 $ REAL,34 $ SECNUM,35 $ ESYS,0    ! ELEMNODES = 8
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keyo,cid,8,2               ! auto create asymmetric contact (from Program Controlled setting)
keyo,cid,10,0              ! adjust contact stiffness each NR iteration (from Program Controlled setting)
keyo,cid,12,5              ! bonded always
keyo,cid,18,1              ! small sliding turned on by application
keyo,cid,2,2               ! MPC for bonded contacts (from Program Controlled setting)
keyo,tid,5,4               ! Force Distributed Constraint, All Directions
keyo,cid,4,2               ! on nodal point - normal to target surface (from Program Controlled setting)
keyo,cid,9,1               ! ignore initial gaps/penetration
keyo,cid,7,0               ! No Prediction
rmod,tid,3,10.      ! FKN
rmod,tid,5,0.       ! ICONT
rmod,tid,6,-3.06534120792262e-003       ! PINB
rmod,tid,10,0.      ! CNOF
rmod,tid,12,0.      ! FKT
rmod,tid,36,172     ! WB DSID
rmod,cid,3,10.      ! FKN
rmod,cid,5,0.       ! ICONT
rmod,cid,6,-3.06534120792262e-003       ! PINB
rmod,cid,10,0.      ! CNOF
rmod,cid,12,0.      ! FKT
rmod,cid,36,172     ! WB DSID
/com,*********** Create Contact "Contact Region 11" ***********
*set,tid,37
*set,cid,36
r,tid
r,cid
et,tid,170
et,cid,174
MAT,37 $ TYPE,37 $ REAL,37 $ SECNUM,37 $ ESYS,0    ! ELEMNODES = 4
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MAT,36 $ TYPE,36 $ REAL,36 $ SECNUM,36 $ ESYS,0    ! ELEMNODES = 4
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MAT,36 $ TYPE,36 $ REAL,37 $ SECNUM,36 $ ESYS,0    ! ELEMNODES = 8
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MAT,37 $ TYPE,37 $ REAL,36 $ SECNUM,37 $ ESYS,0    ! ELEMNODES = 8
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keyo,cid,8,2               ! auto create asymmetric contact (from Program Controlled setting)
keyo,cid,10,0              ! adjust contact stiffness each NR iteration (from Program Controlled setting)
keyo,cid,12,5              ! bonded always
keyo,cid,18,1              ! small sliding turned on by application
keyo,cid,2,2               ! MPC for bonded contacts (from Program Controlled setting)
keyo,tid,5,4               ! Force Distributed Constraint, All Directions
keyo,cid,4,2               ! on nodal point - normal to target surface (from Program Controlled setting)
keyo,cid,9,1               ! ignore initial gaps/penetration
keyo,cid,7,0               ! No Prediction
rmod,tid,3,10.      ! FKN
rmod,tid,5,0.       ! ICONT
rmod,tid,6,-3.06534120792262e-003       ! PINB
rmod,tid,10,0.      ! CNOF
rmod,tid,12,0.      ! FKT
rmod,tid,36,175     ! WB DSID
rmod,cid,3,10.      ! FKN
rmod,cid,5,0.       ! ICONT
rmod,cid,6,-3.06534120792262e-003       ! PINB
rmod,cid,10,0.      ! CNOF
rmod,cid,12,0.      ! FKT
rmod,cid,36,175     ! WB DSID
/com,*********** Create Contact "Contact Region 12" ***********
*set,tid,39
*set,cid,38
r,tid
r,cid
et,tid,170
et,cid,174
MAT,39 $ TYPE,39 $ REAL,39 $ SECNUM,39 $ ESYS,0    ! ELEMNODES = 4
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MAT,38 $ TYPE,38 $ REAL,38 $ SECNUM,38 $ ESYS,0    ! ELEMNODES = 4
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MAT,38 $ TYPE,38 $ REAL,39 $ SECNUM,38 $ ESYS,0    ! ELEMNODES = 8
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MAT,39 $ TYPE,39 $ REAL,38 $ SECNUM,39 $ ESYS,0    ! ELEMNODES = 8
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keyo,cid,8,2               ! auto create asymmetric contact (from Program Controlled setting)
keyo,cid,10,0              ! adjust contact stiffness each NR iteration (from Program Controlled setting)
keyo,cid,12,5              ! bonded always
keyo,cid,18,1              ! small sliding turned on by application
keyo,cid,2,2               ! MPC for bonded contacts (from Program Controlled setting)
keyo,tid,5,4               ! Force Distributed Constraint, All Directions
keyo,cid,4,2               ! on nodal point - normal to target surface (from Program Controlled setting)
keyo,cid,9,1               ! ignore initial gaps/penetration
keyo,cid,7,0               ! No Prediction
rmod,tid,3,10.      ! FKN
rmod,tid,5,0.       ! ICONT
rmod,tid,6,-3.06534120792262e-003       ! PINB
rmod,tid,10,0.      ! CNOF
rmod,tid,12,0.      ! FKT
rmod,tid,36,178     ! WB DSID
rmod,cid,3,10.      ! FKN
rmod,cid,5,0.       ! ICONT
rmod,cid,6,-3.06534120792262e-003       ! PINB
rmod,cid,10,0.      ! CNOF
rmod,cid,12,0.      ! FKT
rmod,cid,36,178     ! WB DSID
/com,*********** Create Contact "Contact Region 13" ***********
*set,tid,41
*set,cid,40
r,tid
r,cid
et,tid,170
et,cid,174
MAT,41 $ TYPE,41 $ REAL,41 $ SECNUM,41 $ ESYS,0    ! ELEMNODES = 4
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MAT,40 $ TYPE,40 $ REAL,40 $ SECNUM,40 $ ESYS,0    ! ELEMNODES = 4
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MAT,40 $ TYPE,40 $ REAL,41 $ SECNUM,40 $ ESYS,0    ! ELEMNODES = 8
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MAT,41 $ TYPE,41 $ REAL,40 $ SECNUM,41 $ ESYS,0    ! ELEMNODES = 8
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keyo,cid,8,2               ! auto create asymmetric contact (from Program Controlled setting)
keyo,cid,10,0              ! adjust contact stiffness each NR iteration (from Program Controlled setting)
keyo,cid,12,5              ! bonded always
keyo,cid,18,1              ! small sliding turned on by application
keyo,cid,2,0               ! augmented Lagrange (from Program Controlled setting)
keyo,cid,4,0               ! on Gauss point (from Program Controlled setting)
keyo,cid,9,1               ! ignore initial gaps/penetration
keyo,cid,7,0               ! No Prediction
rmod,tid,3,10.      ! FKN
rmod,tid,5,0.       ! ICONT
rmod,tid,6,-3.06534120792262e-003       ! PINB
rmod,tid,10,0.      ! CNOF
rmod,tid,12,0.      ! FKT
rmod,tid,36,181     ! WB DSID
rmod,cid,3,10.      ! FKN
rmod,cid,5,0.       ! ICONT
rmod,cid,6,-3.06534120792262e-003       ! PINB
rmod,cid,10,0.      ! CNOF
rmod,cid,12,0.      ! FKT
rmod,cid,36,181     ! WB DSID
/com,*********** Create Contact "Contact Region 14" ***********
*set,tid,43
*set,cid,42
r,tid
r,cid
et,tid,170
et,cid,174
MAT,43 $ TYPE,43 $ REAL,43 $ SECNUM,43 $ ESYS,0    ! ELEMNODES = 4
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MAT,42 $ TYPE,42 $ REAL,42 $ SECNUM,42 $ ESYS,0    ! ELEMNODES = 4
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MAT,42 $ TYPE,42 $ REAL,43 $ SECNUM,42 $ ESYS,0    ! ELEMNODES = 8
eblock,21,COMPACT,,1
(21i9)
    40872    13797    13798    13804    13803    14640    14642    14649    14641
-1
secnum,1    ! reset the section ID to default
MAT,43 $ TYPE,43 $ REAL,42 $ SECNUM,43 $ ESYS,0    ! ELEMNODES = 8
eblock,21,COMPACT,,1
(21i9)
    40873    13797    13798    13804    13803    14640    14642    14649    14641
-1
secnum,1    ! reset the section ID to default
keyo,cid,8,2               ! auto create asymmetric contact (from Program Controlled setting)
keyo,cid,10,0              ! adjust contact stiffness each NR iteration (from Program Controlled setting)
keyo,cid,12,5              ! bonded always
keyo,cid,18,1              ! small sliding turned on by application
keyo,cid,2,0               ! augmented Lagrange (from Program Controlled setting)
keyo,cid,4,0               ! on Gauss point (from Program Controlled setting)
keyo,cid,9,1               ! ignore initial gaps/penetration
keyo,cid,7,0               ! No Prediction
rmod,tid,3,10.      ! FKN
rmod,tid,5,0.       ! ICONT
rmod,tid,6,-3.06534120792262e-003       ! PINB
rmod,tid,10,0.      ! CNOF
rmod,tid,12,0.      ! FKT
rmod,tid,36,184     ! WB DSID
rmod,cid,3,10.      ! FKN
rmod,cid,5,0.       ! ICONT
rmod,cid,6,-3.06534120792262e-003       ! PINB
rmod,cid,10,0.      ! CNOF
rmod,cid,12,0.      ! FKT
rmod,cid,36,184     ! WB DSID
/com,*********** Create Contact "Contact Region 15" ***********
*set,tid,45
*set,cid,44
r,tid
r,cid
et,tid,170
et,cid,174
MAT,45 $ TYPE,45 $ REAL,45 $ SECNUM,45 $ ESYS,0    ! ELEMNODES = 4
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MAT,44 $ TYPE,44 $ REAL,44 $ SECNUM,44 $ ESYS,0    ! ELEMNODES = 4
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MAT,44 $ TYPE,44 $ REAL,45 $ SECNUM,44 $ ESYS,0    ! ELEMNODES = 8
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MAT,45 $ TYPE,45 $ REAL,44 $ SECNUM,45 $ ESYS,0    ! ELEMNODES = 8
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keyo,cid,8,2               ! auto create asymmetric contact (from Program Controlled setting)
keyo,cid,10,0              ! adjust contact stiffness each NR iteration (from Program Controlled setting)
keyo,cid,12,5              ! bonded always
keyo,cid,18,1              ! small sliding turned on by application
keyo,cid,2,2               ! MPC for bonded contacts (from Program Controlled setting)
keyo,tid,5,4               ! Force Distributed Constraint, All Directions
keyo,cid,4,2               ! on nodal point - normal to target surface (from Program Controlled setting)
keyo,cid,9,1               ! ignore initial gaps/penetration
keyo,cid,7,0               ! No Prediction
rmod,tid,3,10.      ! FKN
rmod,tid,5,0.       ! ICONT
rmod,tid,6,-3.06534120792262e-003       ! PINB
rmod,tid,10,0.      ! CNOF
rmod,tid,12,0.      ! FKT
rmod,tid,36,187     ! WB DSID
rmod,cid,3,10.      ! FKN
rmod,cid,5,0.       ! ICONT
rmod,cid,6,-3.06534120792262e-003       ! PINB
rmod,cid,10,0.      ! CNOF
rmod,cid,12,0.      ! FKT
rmod,cid,36,187     ! WB DSID
/com,*********** Create Contact "Contact Region 16" ***********
*set,tid,47
*set,cid,46
r,tid
r,cid
et,tid,170
et,cid,174
MAT,47 $ TYPE,47 $ REAL,47 $ SECNUM,47 $ ESYS,0    ! ELEMNODES = 4
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MAT,46 $ TYPE,46 $ REAL,46 $ SECNUM,46 $ ESYS,0    ! ELEMNODES = 4
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MAT,46 $ TYPE,46 $ REAL,47 $ SECNUM,46 $ ESYS,0    ! ELEMNODES = 8
eblock,21,COMPACT,,1
(21i9)
    40896    13801    13802    13800    13799    14646    14645    14643    14644
-1
secnum,1    ! reset the section ID to default
MAT,47 $ TYPE,47 $ REAL,46 $ SECNUM,47 $ ESYS,0    ! ELEMNODES = 8
eblock,21,COMPACT,,1
(21i9)
    40897    13801    13802    13800    13799    14646    14645    14643    14644
-1
secnum,1    ! reset the section ID to default
keyo,cid,8,2               ! auto create asymmetric contact (from Program Controlled setting)
keyo,cid,10,0              ! adjust contact stiffness each NR iteration (from Program Controlled setting)
keyo,cid,12,5              ! bonded always
keyo,cid,18,1              ! small sliding turned on by application
keyo,cid,2,2               ! MPC for bonded contacts (from Program Controlled setting)
keyo,tid,5,4               ! Force Distributed Constraint, All Directions
keyo,cid,4,2               ! on nodal point - normal to target surface (from Program Controlled setting)
keyo,cid,9,1               ! ignore initial gaps/penetration
keyo,cid,7,0               ! No Prediction
rmod,tid,3,10.      ! FKN
rmod,tid,5,0.       ! ICONT
rmod,tid,6,-3.06534120792262e-003       ! PINB
rmod,tid,10,0.      ! CNOF
rmod,tid,12,0.      ! FKT
rmod,tid,36,190     ! WB DSID
rmod,cid,3,10.      ! FKN
rmod,cid,5,0.       ! ICONT
rmod,cid,6,-3.06534120792262e-003       ! PINB
rmod,cid,10,0.      ! CNOF
rmod,cid,12,0.      ! FKT
rmod,cid,36,190     ! WB DSID
nsel,all
esel,all
/com,*********** Fixed Supports ***********
CMBLOCK,_FIXEDSU,NODE,        2
(8i10)
     21489    -21575
cmsel,s,_FIXEDSU
d,all,all
nsel,all
fini
/solu
antype,2                   ! modal analysis
_thickRatio=  0     ! Ratio of thick parts in the model
thexpand,off     ! ignore thermal strains
modopt,lanb,12
outres,erase
outres,all,none
outres,nsol,all
mxpand,,,,,,,       ! default expand in case of complex solution
dmpopt,esav,no
dmpopt,emat,no
dmpopt,full,no
! ****** Begin Command Snippet ******
! Correction 1: clamp the whole root section.
! Every node in the root plane y = 0 (skin root edge, spar root faces, root cap) is fixed.
! Units: m (the solver input is written in SI).
nsel,s,loc,y,-1e-5,1e-5
d,all,all
allsel,all

! ****** End   Command Snippet ******
! *********** WB SOLVE COMMAND ***********
! check interactive state
*get,ANSINTER_,active,,int
*if,ANSINTER_,ne,0,then
/eof
*endif
solve
/com *************** Write FE CONNECTORS *********
CEWRITE,file,ce,,INTE
*get,_nmodalsolproc,active,0,numcpu
fini
*get,_NSOLTHREADS,active,0,ntfs
*get,_NSOLPROCESSES,active,0,npfs
/post1
*dim,_direction,CHAR,6,1
_direction(1) = 'X'
_direction(2) = 'Y'
_direction(3) = 'Z'
_direction(4) = 'ROTX'
_direction(5) = 'ROTY'
_direction(6) = 'ROTZ'
*get,_lastLS,active,0,set,LSTP
*get,_beginset,active,0,set,nset,first,_lastLS
*get,_endset,active,0,set,nset,last,_lastLS
_nummodes = 0
*if,_endset,gt,0,then
_nummodes = _endset - _beginset + 1
*endif
*do,i_mode,1,_nummodes
   *do,j_component,1,6
			*get,PFACT_%i_mode%_%j_component%,MODE,%i_mode%,PFACT,,DIREC,_direction(%j_component%)
   *enddo
*enddo
*dim,_tmdirection,CHAR,6,1
_tmdirection(1) = 'X'
_tmdirection(2) = 'Y'
_tmdirection(3) = 'Z'
_tmdirection(4) = 'X'
_tmdirection(5) = 'Y'
_tmdirection(6) = 'Z'
*do,j_component,1,6
    *if,j_component,gt,3,then
        *get,TOTALMASS_%j_component%,ELEM,0,IOR,_tmdirection(%j_component%)
    *else
        *get,TOTALMASS_%j_component%,ELEM,0,MTOT,_tmdirection(%j_component%)
    *endif
*enddo
fini
