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/batch
! ANSYS input file written by Workbench version 2026 R1
! File used for geometry attach: D:\6th sem\FEA\project\FEA Proeject (~recovered).step
/title,unfailed attempt--Static Structural (B5)
/com,--- Data in consistent MKS units. See Solving Units in the help system for more information.
/units,MKS
/prep7
! Turn off shape checking because checks already performed inside WB mesher.
! See help system for more information.
SHPP,OFF,,NOWARN
etcon,set             ! allow ANSYS to choose best KEYOP's for 180x elements, resets any applicable keyopt to MAPDL defaults
/com,*********** Send User Defined Coordinate System(s) ***********
csys,0
/com,*********** Nodes for the whole assembly ***********
nblock,3,,16506
(1i9,3e20.9e3)
        1     1.383114677E-02     4.106741027E-01    -7.478851869E-03
        2     9.269607068E-02     4.220948408E-01     1.813645664E-02
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-1
/com,*********** Elements for Body 1 'FEA Proeject (v4~recovered)|Wing_body' ***********
et,1,181
keyo,1,1,0          ! bending and membrane stiffness
keyo,1,3,2
MAT,1 $ TYPE,1 $ REAL,1 $ SECNUM,1 $ ESYS,0    ! ELEMNODES = 4
eblock,21,COMPACT,,12870
(21i9)
        1     5718     5707     1049     1049
        2     5488     5300       12       12
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-1
secnum,1    ! reset the section ID to default
/com,*********** Elements for Body 2 'FEA Proeject (v4~recovered)|Body44' ***********
et,2,181
keyo,2,1,0          ! bending and membrane stiffness
keyo,2,3,2
MAT,2 $ TYPE,2 $ REAL,2 $ SECNUM,2 $ ESYS,0    ! ELEMNODES = 4
eblock,21,COMPACT,,62
(21i9)
    12895     6521     6508     6501     6501
    12896     6503     6502     6504     6504
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-1
secnum,1    ! reset the section ID to default
/com,*********** Elements for Body 3 'FEA Proeject (v4~recovered)|Body45' ***********
et,3,181
keyo,3,1,0          ! bending and membrane stiffness
keyo,3,3,2
MAT,3 $ TYPE,3 $ REAL,3 $ SECNUM,3 $ ESYS,0    ! ELEMNODES = 4
eblock,21,COMPACT,,37
(21i9)
    12947     6618     6583     6612     6612
    12954     6588     6587     6581     6581
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-1
secnum,1    ! reset the section ID to default
/com,*********** Elements for Body 4 'FEA Proeject (v4~recovered)|Rib1' ***********
et,4,186
keyo,4,2,1          ! set full integration on SOLID186
MAT,4 $ TYPE,4 $ REAL,4 $ SECNUM,4 $ ESYS,0    ! ELEMNODES = 20
eblock,21,COMPACT,,59
(21i9)
    12970     6628     6659     6630     6629     6691     6660     6689     6690     6797     6806     6801     6796     6912     6911     6988     6990     6798     6909     6807     6803
    12971     6630     6659     6788     6787     6689     6660     6734     6733     6806     6910     7156     6808     6911     6913     7084     6989     6807     6909     7087     7085
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-1
secnum,1    ! reset the section ID to default
/com,*********** Elements for Body 5 'FEA Proeject (v4~recovered)|rib2' ***********
et,5,186
keyo,5,2,1          ! set full integration on SOLID186
MAT,5 $ TYPE,5 $ REAL,5 $ SECNUM,5 $ ESYS,0    ! ELEMNODES = 20
eblock,21,COMPACT,,57
(21i9)
    13029     7228     7229     7266     7267     7280     7281     7318     7319     7527     7531     7605     7528     7631     7634     7671     7632     7529     7532     7606     7608
    13030     7167     7193     7192     7168     7220     7194     7195     7219     7339     7429     7343     7338     7435     7434     7439     7501     7340     7432     7430     7344
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-1
secnum,1    ! reset the section ID to default
/com,*********** Elements for Body 6 'FEA Proeject (v4~recovered)|rib3' ***********
et,6,186
keyo,6,2,1          ! set full integration on SOLID186
MAT,6 $ TYPE,6 $ REAL,6 $ SECNUM,6 $ ESYS,0    ! ELEMNODES = 20
eblock,21,COMPACT,,55
(21i9)
    13086     7680     7694     7799     7798     7733     7719     7747     7746     7857     7912     8150     7859     7984     7985     8049     8017     7858     7911     8052     8050
    13087     7680     7681     7682     7694     7733     7732     7731     7719     7856     7860     7864     7857     8013     8011     7983     7984     7858     7861     7865     7911
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-1
secnum,1    ! reset the section ID to default
/com,*********** Elements for Body 7 'FEA Proeject (v4~recovered)|rib4' ***********
et,7,186
keyo,7,2,1          ! set full integration on SOLID186
MAT,7 $ TYPE,7 $ REAL,7 $ SECNUM,7 $ ESYS,0    ! ELEMNODES = 20
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/com,*********** Elements for Body 8 'FEA Proeject (v4~recovered)|rib5' ***********
et,8,186
keyo,8,2,1          ! set full integration on SOLID186
MAT,8 $ TYPE,8 $ REAL,8 $ SECNUM,8 $ ESYS,0    ! ELEMNODES = 20
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/com,*********** Elements for Body 9 'FEA Proeject (v4~recovered)|rib6' ***********
et,9,186
keyo,9,2,1          ! set full integration on SOLID186
MAT,9 $ TYPE,9 $ REAL,9 $ SECNUM,9 $ ESYS,0    ! ELEMNODES = 20
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/com,*********** Elements for Body 10 'FEA Proeject (v4~recovered)|rib7' ***********
et,10,186
keyo,10,2,1         ! set full integration on SOLID186
MAT,10 $ TYPE,10 $ REAL,10 $ SECNUM,10 $ ESYS,0    ! ELEMNODES = 20
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/com,*********** Elements for Body 11 'FEA Proeject (v4~recovered)|rib8' ***********
et,11,186
keyo,11,2,1         ! set full integration on SOLID186
MAT,11 $ TYPE,11 $ REAL,11 $ SECNUM,11 $ ESYS,0    ! ELEMNODES = 20
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/com,*********** Elements for Body 12 'FEA Proeject (v4~recovered)|rib9' ***********
et,12,186
keyo,12,2,1         ! set full integration on SOLID186
MAT,12 $ TYPE,12 $ REAL,12 $ SECNUM,12 $ ESYS,0    ! ELEMNODES = 20
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/com,*********** Elements for Body 13 'FEA Proeject (v4~recovered)|rib10' ***********
et,13,186
keyo,13,2,1         ! set full integration on SOLID186
MAT,13 $ TYPE,13 $ REAL,13 $ SECNUM,13 $ ESYS,0    ! ELEMNODES = 20
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/com,*********** Elements for Body 14 'FEA Proeject (v4~recovered)|spar1' ***********
et,14,186
keyo,14,2,1         ! set full integration on SOLID186
MAT,14 $ TYPE,14 $ REAL,14 $ SECNUM,14 $ ESYS,0    ! ELEMNODES = 20
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/com,*********** Elements for Body 15 'FEA Proeject (v4~recovered)|spar2' ***********
et,15,186
keyo,15,2,1         ! set full integration on SOLID186
MAT,15 $ TYPE,15 $ REAL,15 $ SECNUM,15 $ ESYS,0    ! ELEMNODES = 20
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toffst,273.15,      ! Temperature offset from absolute zero
/com,*********** Set Reference Temperature ***********
tref,22.
/com,*********** Send Materials ***********
MP,EX,1,70000000000,	! Pa
MP,NUXY,1,0.33,
MP,DENS,1,2700,	! kg m^-3

MP,EX,2,70000000000,	! Pa
MP,NUXY,2,0.33,
MP,DENS,2,2700,	! kg m^-3

MP,EX,3,70000000000,	! Pa
MP,NUXY,3,0.33,
MP,DENS,3,2700,	! kg m^-3

MP,EX,4,70000000000,	! Pa
MP,NUXY,4,0.33,
MP,DENS,4,2700,	! kg m^-3

MP,EX,5,70000000000,	! Pa
MP,NUXY,5,0.33,
MP,DENS,5,2700,	! kg m^-3

MP,EX,6,70000000000,	! Pa
MP,NUXY,6,0.33,
MP,DENS,6,2700,	! kg m^-3

MP,EX,7,70000000000,	! Pa
MP,NUXY,7,0.33,
MP,DENS,7,2700,	! kg m^-3

MP,EX,8,70000000000,	! Pa
MP,NUXY,8,0.33,
MP,DENS,8,2700,	! kg m^-3

MP,EX,9,70000000000,	! Pa
MP,NUXY,9,0.33,
MP,DENS,9,2700,	! kg m^-3

MP,EX,10,70000000000,	! Pa
MP,NUXY,10,0.33,
MP,DENS,10,2700,	! kg m^-3

MP,EX,11,70000000000,	! Pa
MP,NUXY,11,0.33,
MP,DENS,11,2700,	! kg m^-3

MP,EX,12,70000000000,	! Pa
MP,NUXY,12,0.33,
MP,DENS,12,2700,	! kg m^-3

MP,EX,13,70000000000,	! Pa
MP,NUXY,13,0.33,
MP,DENS,13,2700,	! kg m^-3

MP,EX,14,70000000000,	! Pa
MP,NUXY,14,0.33,
MP,DENS,14,2700,	! kg m^-3

MP,EX,15,70000000000,	! Pa
MP,NUXY,15,0.33,
MP,DENS,15,2700,	! kg m^-3

/com,*********** Send Sheet Properties ***********
sectype,1,shell
secdata,8.e-003
secoff,mid

sectype,2,shell
secdata,1.e-004
secoff,mid

sectype,3,shell
secdata,1.e-004
secoff,mid

!************************* Model Summary ********************
! FEA Proeject (v4~recovered)|Wing_body,	Aluminium aAlloy,	matid,	1
! FEA Proeject (v4~recovered)|Body44,	Aluminium aAlloy,	matid,	2
! FEA Proeject (v4~recovered)|Body45,	Aluminium aAlloy,	matid,	3
! FEA Proeject (v4~recovered)|Rib1,	Aluminium aAlloy,	matid,	4
! FEA Proeject (v4~recovered)|rib2,	Aluminium aAlloy,	matid,	5
! FEA Proeject (v4~recovered)|rib3,	Aluminium aAlloy,	matid,	6
! FEA Proeject (v4~recovered)|rib4,	Aluminium aAlloy,	matid,	7
! FEA Proeject (v4~recovered)|rib5,	Aluminium aAlloy,	matid,	8
! FEA Proeject (v4~recovered)|rib6,	Aluminium aAlloy,	matid,	9
! FEA Proeject (v4~recovered)|rib7,	Aluminium aAlloy,	matid,	10
! FEA Proeject (v4~recovered)|rib8,	Aluminium aAlloy,	matid,	11
! FEA Proeject (v4~recovered)|rib9,	Aluminium aAlloy,	matid,	12
! FEA Proeject (v4~recovered)|rib10,	Aluminium aAlloy,	matid,	13
! FEA Proeject (v4~recovered)|spar1,	Aluminium aAlloy,	matid,	14
! FEA Proeject (v4~recovered)|spar2,	Aluminium aAlloy,	matid,	15
!************************* End Model Summary ********************
/com,*********** Create Contact "Contact Region" ***********
*set,tid,17
*set,cid,16
r,tid
r,cid
et,tid,170
et,cid,174
MAT,17 $ TYPE,17 $ REAL,17 $ SECNUM,17 $ ESYS,0    ! ELEMNODES = 4
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MAT,16 $ TYPE,16 $ REAL,16 $ SECNUM,16 $ ESYS,0    ! ELEMNODES = 4
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MAT,16 $ TYPE,16 $ REAL,17 $ SECNUM,16 $ ESYS,0    ! ELEMNODES = 8
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MAT,17 $ TYPE,17 $ REAL,16 $ SECNUM,17 $ ESYS,0    ! ELEMNODES = 8
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keyo,cid,8,2               ! auto create asymmetric contact (from Program Controlled setting)
keyo,cid,10,0              ! adjust contact stiffness each NR iteration (from Program Controlled setting)
keyo,cid,12,5              ! bonded always
keyo,cid,18,1              ! small sliding turned on by application
keyo,cid,2,2               ! MPC for bonded contacts (from Program Controlled setting)
keyo,tid,5,4               ! Force Distributed Constraint, All Directions
keyo,cid,4,2               ! on nodal point - normal to target surface (from Program Controlled setting)
keyo,cid,9,1               ! ignore initial gaps/penetration
keyo,cid,7,0               ! No Prediction
rmod,tid,3,10.      ! FKN
rmod,tid,5,0.       ! ICONT
rmod,tid,6,-3.06534120792262e-003       ! PINB
rmod,tid,10,0.      ! CNOF
rmod,tid,12,0.      ! FKT
rmod,tid,36,445     ! WB DSID
rmod,cid,3,10.      ! FKN
rmod,cid,5,0.       ! ICONT
rmod,cid,6,-3.06534120792262e-003       ! PINB
rmod,cid,10,0.      ! CNOF
rmod,cid,12,0.      ! FKT
rmod,cid,36,445     ! WB DSID
/com,*********** Create Contact "Contact Region 2" ***********
*set,tid,19
*set,cid,18
r,tid
r,cid
et,tid,170
et,cid,174
MAT,19 $ TYPE,19 $ REAL,19 $ SECNUM,19 $ ESYS,0    ! ELEMNODES = 4
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MAT,18 $ TYPE,18 $ REAL,18 $ SECNUM,18 $ ESYS,0    ! ELEMNODES = 4
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MAT,18 $ TYPE,18 $ REAL,19 $ SECNUM,18 $ ESYS,0    ! ELEMNODES = 8
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MAT,19 $ TYPE,19 $ REAL,18 $ SECNUM,19 $ ESYS,0    ! ELEMNODES = 8
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keyo,cid,8,2               ! auto create asymmetric contact (from Program Controlled setting)
keyo,cid,10,0              ! adjust contact stiffness each NR iteration (from Program Controlled setting)
keyo,cid,12,5              ! bonded always
keyo,cid,18,1              ! small sliding turned on by application
keyo,cid,2,2               ! MPC for bonded contacts (from Program Controlled setting)
keyo,tid,5,4               ! Force Distributed Constraint, All Directions
keyo,cid,4,2               ! on nodal point - normal to target surface (from Program Controlled setting)
keyo,cid,9,1               ! ignore initial gaps/penetration
keyo,cid,7,0               ! No Prediction
rmod,tid,3,10.      ! FKN
rmod,tid,5,0.       ! ICONT
rmod,tid,6,-3.06534120792262e-003       ! PINB
rmod,tid,10,0.      ! CNOF
rmod,tid,12,0.      ! FKT
rmod,tid,36,448     ! WB DSID
rmod,cid,3,10.      ! FKN
rmod,cid,5,0.       ! ICONT
rmod,cid,6,-3.06534120792262e-003       ! PINB
rmod,cid,10,0.      ! CNOF
rmod,cid,12,0.      ! FKT
rmod,cid,36,448     ! WB DSID
/com,*********** Create Contact "Contact Region 3" ***********
*set,tid,21
*set,cid,20
r,tid
r,cid
et,tid,170
et,cid,174
MAT,21 $ TYPE,21 $ REAL,21 $ SECNUM,21 $ ESYS,0    ! ELEMNODES = 4
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MAT,20 $ TYPE,20 $ REAL,20 $ SECNUM,20 $ ESYS,0    ! ELEMNODES = 4
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MAT,20 $ TYPE,20 $ REAL,21 $ SECNUM,20 $ ESYS,0    ! ELEMNODES = 8
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MAT,21 $ TYPE,21 $ REAL,20 $ SECNUM,21 $ ESYS,0    ! ELEMNODES = 8
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keyo,cid,8,2               ! auto create asymmetric contact (from Program Controlled setting)
keyo,cid,10,0              ! adjust contact stiffness each NR iteration (from Program Controlled setting)
keyo,cid,12,5              ! bonded always
keyo,cid,18,1              ! small sliding turned on by application
keyo,cid,2,2               ! MPC for bonded contacts (from Program Controlled setting)
keyo,tid,5,4               ! Force Distributed Constraint, All Directions
keyo,cid,4,2               ! on nodal point - normal to target surface (from Program Controlled setting)
keyo,cid,9,1               ! ignore initial gaps/penetration
keyo,cid,7,0               ! No Prediction
rmod,tid,3,10.      ! FKN
rmod,tid,5,0.       ! ICONT
rmod,tid,6,-3.06534120792262e-003       ! PINB
rmod,tid,10,0.      ! CNOF
rmod,tid,12,0.      ! FKT
rmod,tid,36,451     ! WB DSID
rmod,cid,3,10.      ! FKN
rmod,cid,5,0.       ! ICONT
rmod,cid,6,-3.06534120792262e-003       ! PINB
rmod,cid,10,0.      ! CNOF
rmod,cid,12,0.      ! FKT
rmod,cid,36,451     ! WB DSID
/com,*********** Create Contact "Contact Region 4" ***********
*set,tid,23
*set,cid,22
r,tid
r,cid
et,tid,170
et,cid,174
MAT,23 $ TYPE,23 $ REAL,23 $ SECNUM,23 $ ESYS,0    ! ELEMNODES = 4
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MAT,22 $ TYPE,22 $ REAL,22 $ SECNUM,22 $ ESYS,0    ! ELEMNODES = 4
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MAT,22 $ TYPE,22 $ REAL,23 $ SECNUM,22 $ ESYS,0    ! ELEMNODES = 8
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MAT,23 $ TYPE,23 $ REAL,22 $ SECNUM,23 $ ESYS,0    ! ELEMNODES = 8
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keyo,cid,8,2               ! auto create asymmetric contact (from Program Controlled setting)
keyo,cid,10,0              ! adjust contact stiffness each NR iteration (from Program Controlled setting)
keyo,cid,12,5              ! bonded always
keyo,cid,18,1              ! small sliding turned on by application
keyo,cid,2,2               ! MPC for bonded contacts (from Program Controlled setting)
keyo,tid,5,4               ! Force Distributed Constraint, All Directions
keyo,cid,4,2               ! on nodal point - normal to target surface (from Program Controlled setting)
keyo,cid,9,1               ! ignore initial gaps/penetration
keyo,cid,7,0               ! No Prediction
rmod,tid,3,10.      ! FKN
rmod,tid,5,0.       ! ICONT
rmod,tid,6,-3.06534120792262e-003       ! PINB
rmod,tid,10,0.      ! CNOF
rmod,tid,12,0.      ! FKT
rmod,tid,36,454     ! WB DSID
rmod,cid,3,10.      ! FKN
rmod,cid,5,0.       ! ICONT
rmod,cid,6,-3.06534120792262e-003       ! PINB
rmod,cid,10,0.      ! CNOF
rmod,cid,12,0.      ! FKT
rmod,cid,36,454     ! WB DSID
/com,*********** Create Contact "Contact Region 5" ***********
*set,tid,25
*set,cid,24
r,tid
r,cid
et,tid,170
et,cid,174
MAT,25 $ TYPE,25 $ REAL,25 $ SECNUM,25 $ ESYS,0    ! ELEMNODES = 4
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MAT,24 $ TYPE,24 $ REAL,24 $ SECNUM,24 $ ESYS,0    ! ELEMNODES = 4
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MAT,24 $ TYPE,24 $ REAL,25 $ SECNUM,24 $ ESYS,0    ! ELEMNODES = 8
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MAT,25 $ TYPE,25 $ REAL,24 $ SECNUM,25 $ ESYS,0    ! ELEMNODES = 8
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keyo,cid,8,2               ! auto create asymmetric contact (from Program Controlled setting)
keyo,cid,10,0              ! adjust contact stiffness each NR iteration (from Program Controlled setting)
keyo,cid,12,5              ! bonded always
keyo,cid,18,1              ! small sliding turned on by application
keyo,cid,2,2               ! MPC for bonded contacts (from Program Controlled setting)
keyo,tid,5,4               ! Force Distributed Constraint, All Directions
keyo,cid,4,2               ! on nodal point - normal to target surface (from Program Controlled setting)
keyo,cid,9,1               ! ignore initial gaps/penetration
keyo,cid,7,0               ! No Prediction
rmod,tid,3,10.      ! FKN
rmod,tid,5,0.       ! ICONT
rmod,tid,6,-3.06534120792262e-003       ! PINB
rmod,tid,10,0.      ! CNOF
rmod,tid,12,0.      ! FKT
rmod,tid,36,457     ! WB DSID
rmod,cid,3,10.      ! FKN
rmod,cid,5,0.       ! ICONT
rmod,cid,6,-3.06534120792262e-003       ! PINB
rmod,cid,10,0.      ! CNOF
rmod,cid,12,0.      ! FKT
rmod,cid,36,457     ! WB DSID
/com,*********** Create Contact "Contact Region 6" ***********
*set,tid,27
*set,cid,26
r,tid
r,cid
et,tid,170
et,cid,174
MAT,27 $ TYPE,27 $ REAL,27 $ SECNUM,27 $ ESYS,0    ! ELEMNODES = 4
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MAT,26 $ TYPE,26 $ REAL,26 $ SECNUM,26 $ ESYS,0    ! ELEMNODES = 4
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MAT,26 $ TYPE,26 $ REAL,27 $ SECNUM,26 $ ESYS,0    ! ELEMNODES = 8
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MAT,27 $ TYPE,27 $ REAL,26 $ SECNUM,27 $ ESYS,0    ! ELEMNODES = 8
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keyo,cid,8,2               ! auto create asymmetric contact (from Program Controlled setting)
keyo,cid,10,0              ! adjust contact stiffness each NR iteration (from Program Controlled setting)
keyo,cid,12,5              ! bonded always
keyo,cid,18,1              ! small sliding turned on by application
keyo,cid,2,2               ! MPC for bonded contacts (from Program Controlled setting)
keyo,tid,5,4               ! Force Distributed Constraint, All Directions
keyo,cid,4,2               ! on nodal point - normal to target surface (from Program Controlled setting)
keyo,cid,9,1               ! ignore initial gaps/penetration
keyo,cid,7,0               ! No Prediction
rmod,tid,3,10.      ! FKN
rmod,tid,5,0.       ! ICONT
rmod,tid,6,-3.06534120792262e-003       ! PINB
rmod,tid,10,0.      ! CNOF
rmod,tid,12,0.      ! FKT
rmod,tid,36,460     ! WB DSID
rmod,cid,3,10.      ! FKN
rmod,cid,5,0.       ! ICONT
rmod,cid,6,-3.06534120792262e-003       ! PINB
rmod,cid,10,0.      ! CNOF
rmod,cid,12,0.      ! FKT
rmod,cid,36,460     ! WB DSID
/com,*********** Create Contact "Contact Region 7" ***********
*set,tid,29
*set,cid,28
r,tid
r,cid
et,tid,170
et,cid,174
MAT,29 $ TYPE,29 $ REAL,29 $ SECNUM,29 $ ESYS,0    ! ELEMNODES = 4
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MAT,28 $ TYPE,28 $ REAL,28 $ SECNUM,28 $ ESYS,0    ! ELEMNODES = 4
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MAT,28 $ TYPE,28 $ REAL,29 $ SECNUM,28 $ ESYS,0    ! ELEMNODES = 8
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MAT,29 $ TYPE,29 $ REAL,28 $ SECNUM,29 $ ESYS,0    ! ELEMNODES = 8
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keyo,cid,8,2               ! auto create asymmetric contact (from Program Controlled setting)
keyo,cid,10,0              ! adjust contact stiffness each NR iteration (from Program Controlled setting)
keyo,cid,12,5              ! bonded always
keyo,cid,18,1              ! small sliding turned on by application
keyo,cid,2,2               ! MPC for bonded contacts (from Program Controlled setting)
keyo,tid,5,4               ! Force Distributed Constraint, All Directions
keyo,cid,4,2               ! on nodal point - normal to target surface (from Program Controlled setting)
keyo,cid,9,1               ! ignore initial gaps/penetration
keyo,cid,7,0               ! No Prediction
rmod,tid,3,10.      ! FKN
rmod,tid,5,0.       ! ICONT
rmod,tid,6,-3.06534120792262e-003       ! PINB
rmod,tid,10,0.      ! CNOF
rmod,tid,12,0.      ! FKT
rmod,tid,36,463     ! WB DSID
rmod,cid,3,10.      ! FKN
rmod,cid,5,0.       ! ICONT
rmod,cid,6,-3.06534120792262e-003       ! PINB
rmod,cid,10,0.      ! CNOF
rmod,cid,12,0.      ! FKT
rmod,cid,36,463     ! WB DSID
/com,*********** Create Contact "Contact Region 8" ***********
*set,tid,31
*set,cid,30
r,tid
r,cid
et,tid,170
et,cid,174
MAT,31 $ TYPE,31 $ REAL,31 $ SECNUM,31 $ ESYS,0    ! ELEMNODES = 4
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MAT,30 $ TYPE,30 $ REAL,30 $ SECNUM,30 $ ESYS,0    ! ELEMNODES = 4
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MAT,30 $ TYPE,30 $ REAL,31 $ SECNUM,30 $ ESYS,0    ! ELEMNODES = 8
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MAT,31 $ TYPE,31 $ REAL,30 $ SECNUM,31 $ ESYS,0    ! ELEMNODES = 8
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keyo,cid,8,2               ! auto create asymmetric contact (from Program Controlled setting)
keyo,cid,10,0              ! adjust contact stiffness each NR iteration (from Program Controlled setting)
keyo,cid,12,5              ! bonded always
keyo,cid,18,1              ! small sliding turned on by application
keyo,cid,2,2               ! MPC for bonded contacts (from Program Controlled setting)
keyo,tid,5,4               ! Force Distributed Constraint, All Directions
keyo,cid,4,2               ! on nodal point - normal to target surface (from Program Controlled setting)
keyo,cid,9,1               ! ignore initial gaps/penetration
keyo,cid,7,0               ! No Prediction
rmod,tid,3,10.      ! FKN
rmod,tid,5,0.       ! ICONT
rmod,tid,6,-3.06534120792262e-003       ! PINB
rmod,tid,10,0.      ! CNOF
rmod,tid,12,0.      ! FKT
rmod,tid,36,466     ! WB DSID
rmod,cid,3,10.      ! FKN
rmod,cid,5,0.       ! ICONT
rmod,cid,6,-3.06534120792262e-003       ! PINB
rmod,cid,10,0.      ! CNOF
rmod,cid,12,0.      ! FKT
rmod,cid,36,466     ! WB DSID
/com,*********** Create Contact "Contact Region 9" ***********
*set,tid,33
*set,cid,32
r,tid
r,cid
et,tid,170
et,cid,174
MAT,33 $ TYPE,33 $ REAL,33 $ SECNUM,33 $ ESYS,0    ! ELEMNODES = 4
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MAT,32 $ TYPE,32 $ REAL,32 $ SECNUM,32 $ ESYS,0    ! ELEMNODES = 4
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MAT,32 $ TYPE,32 $ REAL,33 $ SECNUM,32 $ ESYS,0    ! ELEMNODES = 8
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MAT,33 $ TYPE,33 $ REAL,32 $ SECNUM,33 $ ESYS,0    ! ELEMNODES = 8
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keyo,cid,8,2               ! auto create asymmetric contact (from Program Controlled setting)
keyo,cid,10,0              ! adjust contact stiffness each NR iteration (from Program Controlled setting)
keyo,cid,12,5              ! bonded always
keyo,cid,18,1              ! small sliding turned on by application
keyo,cid,2,2               ! MPC for bonded contacts (from Program Controlled setting)
keyo,tid,5,4               ! Force Distributed Constraint, All Directions
keyo,cid,4,2               ! on nodal point - normal to target surface (from Program Controlled setting)
keyo,cid,9,1               ! ignore initial gaps/penetration
keyo,cid,7,0               ! No Prediction
rmod,tid,3,10.      ! FKN
rmod,tid,5,0.       ! ICONT
rmod,tid,6,-3.06534120792262e-003       ! PINB
rmod,tid,10,0.      ! CNOF
rmod,tid,12,0.      ! FKT
rmod,tid,36,469     ! WB DSID
rmod,cid,3,10.      ! FKN
rmod,cid,5,0.       ! ICONT
rmod,cid,6,-3.06534120792262e-003       ! PINB
rmod,cid,10,0.      ! CNOF
rmod,cid,12,0.      ! FKT
rmod,cid,36,469     ! WB DSID
/com,*********** Create Contact "Contact Region 10" ***********
*set,tid,35
*set,cid,34
r,tid
r,cid
et,tid,170
et,cid,174
MAT,35 $ TYPE,35 $ REAL,35 $ SECNUM,35 $ ESYS,0    ! ELEMNODES = 4
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MAT,34 $ TYPE,34 $ REAL,34 $ SECNUM,34 $ ESYS,0    ! ELEMNODES = 4
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MAT,34 $ TYPE,34 $ REAL,35 $ SECNUM,34 $ ESYS,0    ! ELEMNODES = 8
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MAT,35 $ TYPE,35 $ REAL,34 $ SECNUM,35 $ ESYS,0    ! ELEMNODES = 8
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keyo,cid,8,2               ! auto create asymmetric contact (from Program Controlled setting)
keyo,cid,10,0              ! adjust contact stiffness each NR iteration (from Program Controlled setting)
keyo,cid,12,5              ! bonded always
keyo,cid,18,1              ! small sliding turned on by application
keyo,cid,2,2               ! MPC for bonded contacts (from Program Controlled setting)
keyo,tid,5,4               ! Force Distributed Constraint, All Directions
keyo,cid,4,2               ! on nodal point - normal to target surface (from Program Controlled setting)
keyo,cid,9,1               ! ignore initial gaps/penetration
keyo,cid,7,0               ! No Prediction
rmod,tid,3,10.      ! FKN
rmod,tid,5,0.       ! ICONT
rmod,tid,6,-3.06534120792262e-003       ! PINB
rmod,tid,10,0.      ! CNOF
rmod,tid,12,0.      ! FKT
rmod,tid,36,472     ! WB DSID
rmod,cid,3,10.      ! FKN
rmod,cid,5,0.       ! ICONT
rmod,cid,6,-3.06534120792262e-003       ! PINB
rmod,cid,10,0.      ! CNOF
rmod,cid,12,0.      ! FKT
rmod,cid,36,472     ! WB DSID
/com,*********** Create Contact "Contact Region 11" ***********
*set,tid,37
*set,cid,36
r,tid
r,cid
et,tid,170
et,cid,174
MAT,37 $ TYPE,37 $ REAL,37 $ SECNUM,37 $ ESYS,0    ! ELEMNODES = 4
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MAT,36 $ TYPE,36 $ REAL,36 $ SECNUM,36 $ ESYS,0    ! ELEMNODES = 4
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MAT,36 $ TYPE,36 $ REAL,37 $ SECNUM,36 $ ESYS,0    ! ELEMNODES = 8
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MAT,37 $ TYPE,37 $ REAL,36 $ SECNUM,37 $ ESYS,0    ! ELEMNODES = 8
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keyo,cid,8,2               ! auto create asymmetric contact (from Program Controlled setting)
keyo,cid,10,0              ! adjust contact stiffness each NR iteration (from Program Controlled setting)
keyo,cid,12,5              ! bonded always
keyo,cid,18,1              ! small sliding turned on by application
keyo,cid,2,2               ! MPC for bonded contacts (from Program Controlled setting)
keyo,tid,5,4               ! Force Distributed Constraint, All Directions
keyo,cid,4,2               ! on nodal point - normal to target surface (from Program Controlled setting)
keyo,cid,9,1               ! ignore initial gaps/penetration
keyo,cid,7,0               ! No Prediction
rmod,tid,3,10.      ! FKN
rmod,tid,5,0.       ! ICONT
rmod,tid,6,-3.06534120792262e-003       ! PINB
rmod,tid,10,0.      ! CNOF
rmod,tid,12,0.      ! FKT
rmod,tid,36,475     ! WB DSID
rmod,cid,3,10.      ! FKN
rmod,cid,5,0.       ! ICONT
rmod,cid,6,-3.06534120792262e-003       ! PINB
rmod,cid,10,0.      ! CNOF
rmod,cid,12,0.      ! FKT
rmod,cid,36,475     ! WB DSID
/com,*********** Create Contact "Contact Region 12" ***********
*set,tid,39
*set,cid,38
r,tid
r,cid
et,tid,170
et,cid,174
MAT,39 $ TYPE,39 $ REAL,39 $ SECNUM,39 $ ESYS,0    ! ELEMNODES = 4
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MAT,38 $ TYPE,38 $ REAL,38 $ SECNUM,38 $ ESYS,0    ! ELEMNODES = 4
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MAT,38 $ TYPE,38 $ REAL,39 $ SECNUM,38 $ ESYS,0    ! ELEMNODES = 8
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MAT,39 $ TYPE,39 $ REAL,38 $ SECNUM,39 $ ESYS,0    ! ELEMNODES = 8
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keyo,cid,8,2               ! auto create asymmetric contact (from Program Controlled setting)
keyo,cid,10,0              ! adjust contact stiffness each NR iteration (from Program Controlled setting)
keyo,cid,12,5              ! bonded always
keyo,cid,18,1              ! small sliding turned on by application
keyo,cid,2,2               ! MPC for bonded contacts (from Program Controlled setting)
keyo,tid,5,4               ! Force Distributed Constraint, All Directions
keyo,cid,4,2               ! on nodal point - normal to target surface (from Program Controlled setting)
keyo,cid,9,1               ! ignore initial gaps/penetration
keyo,cid,7,0               ! No Prediction
rmod,tid,3,10.      ! FKN
rmod,tid,5,0.       ! ICONT
rmod,tid,6,-3.06534120792262e-003       ! PINB
rmod,tid,10,0.      ! CNOF
rmod,tid,12,0.      ! FKT
rmod,tid,36,478     ! WB DSID
rmod,cid,3,10.      ! FKN
rmod,cid,5,0.       ! ICONT
rmod,cid,6,-3.06534120792262e-003       ! PINB
rmod,cid,10,0.      ! CNOF
rmod,cid,12,0.      ! FKT
rmod,cid,36,478     ! WB DSID
/com,*********** Create Contact "Contact Region 13" ***********
*set,tid,41
*set,cid,40
r,tid
r,cid
et,tid,170
et,cid,174
MAT,41 $ TYPE,41 $ REAL,41 $ SECNUM,41 $ ESYS,0    ! ELEMNODES = 4
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MAT,40 $ TYPE,40 $ REAL,40 $ SECNUM,40 $ ESYS,0    ! ELEMNODES = 4
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MAT,40 $ TYPE,40 $ REAL,41 $ SECNUM,40 $ ESYS,0    ! ELEMNODES = 8
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MAT,41 $ TYPE,41 $ REAL,40 $ SECNUM,41 $ ESYS,0    ! ELEMNODES = 8
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keyo,cid,8,2               ! auto create asymmetric contact (from Program Controlled setting)
keyo,cid,10,0              ! adjust contact stiffness each NR iteration (from Program Controlled setting)
keyo,cid,12,5              ! bonded always
keyo,cid,18,1              ! small sliding turned on by application
keyo,cid,2,0               ! augmented Lagrange (from Program Controlled setting)
keyo,cid,4,0               ! on Gauss point (from Program Controlled setting)
keyo,cid,9,1               ! ignore initial gaps/penetration
keyo,cid,7,0               ! No Prediction
rmod,tid,3,10.      ! FKN
rmod,tid,5,0.       ! ICONT
rmod,tid,6,-3.06534120792262e-003       ! PINB
rmod,tid,10,0.      ! CNOF
rmod,tid,12,0.      ! FKT
rmod,tid,36,481     ! WB DSID
rmod,cid,3,10.      ! FKN
rmod,cid,5,0.       ! ICONT
rmod,cid,6,-3.06534120792262e-003       ! PINB
rmod,cid,10,0.      ! CNOF
rmod,cid,12,0.      ! FKT
rmod,cid,36,481     ! WB DSID
/com,*********** Create Contact "Contact Region 14" ***********
*set,tid,43
*set,cid,42
r,tid
r,cid
et,tid,170
et,cid,174
MAT,43 $ TYPE,43 $ REAL,43 $ SECNUM,43 $ ESYS,0    ! ELEMNODES = 4
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MAT,42 $ TYPE,42 $ REAL,42 $ SECNUM,42 $ ESYS,0    ! ELEMNODES = 4
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MAT,42 $ TYPE,42 $ REAL,43 $ SECNUM,42 $ ESYS,0    ! ELEMNODES = 8
eblock,21,COMPACT,,1
(21i9)
    27903    13797    13798    13804    13803    14640    14642    14649    14641
-1
secnum,1    ! reset the section ID to default
MAT,43 $ TYPE,43 $ REAL,42 $ SECNUM,43 $ ESYS,0    ! ELEMNODES = 8
eblock,21,COMPACT,,1
(21i9)
    27904    13797    13798    13804    13803    14640    14642    14649    14641
-1
secnum,1    ! reset the section ID to default
keyo,cid,8,2               ! auto create asymmetric contact (from Program Controlled setting)
keyo,cid,10,0              ! adjust contact stiffness each NR iteration (from Program Controlled setting)
keyo,cid,12,5              ! bonded always
keyo,cid,18,1              ! small sliding turned on by application
keyo,cid,2,0               ! augmented Lagrange (from Program Controlled setting)
keyo,cid,4,0               ! on Gauss point (from Program Controlled setting)
keyo,cid,9,1               ! ignore initial gaps/penetration
keyo,cid,7,0               ! No Prediction
rmod,tid,3,10.      ! FKN
rmod,tid,5,0.       ! ICONT
rmod,tid,6,-3.06534120792262e-003       ! PINB
rmod,tid,10,0.      ! CNOF
rmod,tid,12,0.      ! FKT
rmod,tid,36,484     ! WB DSID
rmod,cid,3,10.      ! FKN
rmod,cid,5,0.       ! ICONT
rmod,cid,6,-3.06534120792262e-003       ! PINB
rmod,cid,10,0.      ! CNOF
rmod,cid,12,0.      ! FKT
rmod,cid,36,484     ! WB DSID
/com,*********** Create Contact "Contact Region 15" ***********
*set,tid,45
*set,cid,44
r,tid
r,cid
et,tid,170
et,cid,174
MAT,45 $ TYPE,45 $ REAL,45 $ SECNUM,45 $ ESYS,0    ! ELEMNODES = 4
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MAT,44 $ TYPE,44 $ REAL,44 $ SECNUM,44 $ ESYS,0    ! ELEMNODES = 4
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MAT,44 $ TYPE,44 $ REAL,45 $ SECNUM,44 $ ESYS,0    ! ELEMNODES = 8
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MAT,45 $ TYPE,45 $ REAL,44 $ SECNUM,45 $ ESYS,0    ! ELEMNODES = 8
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keyo,cid,8,2               ! auto create asymmetric contact (from Program Controlled setting)
keyo,cid,10,0              ! adjust contact stiffness each NR iteration (from Program Controlled setting)
keyo,cid,12,5              ! bonded always
keyo,cid,18,1              ! small sliding turned on by application
keyo,cid,2,2               ! MPC for bonded contacts (from Program Controlled setting)
keyo,tid,5,4               ! Force Distributed Constraint, All Directions
keyo,cid,4,2               ! on nodal point - normal to target surface (from Program Controlled setting)
keyo,cid,9,1               ! ignore initial gaps/penetration
keyo,cid,7,0               ! No Prediction
rmod,tid,3,10.      ! FKN
rmod,tid,5,0.       ! ICONT
rmod,tid,6,-3.06534120792262e-003       ! PINB
rmod,tid,10,0.      ! CNOF
rmod,tid,12,0.      ! FKT
rmod,tid,36,487     ! WB DSID
rmod,cid,3,10.      ! FKN
rmod,cid,5,0.       ! ICONT
rmod,cid,6,-3.06534120792262e-003       ! PINB
rmod,cid,10,0.      ! CNOF
rmod,cid,12,0.      ! FKT
rmod,cid,36,487     ! WB DSID
/com,*********** Create Contact "Contact Region 16" ***********
*set,tid,47
*set,cid,46
r,tid
r,cid
et,tid,170
et,cid,174
MAT,47 $ TYPE,47 $ REAL,47 $ SECNUM,47 $ ESYS,0    ! ELEMNODES = 4
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MAT,46 $ TYPE,46 $ REAL,46 $ SECNUM,46 $ ESYS,0    ! ELEMNODES = 4
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MAT,46 $ TYPE,46 $ REAL,47 $ SECNUM,46 $ ESYS,0    ! ELEMNODES = 8
eblock,21,COMPACT,,1
(21i9)
    27927    13801    13802    13800    13799    14646    14645    14643    14644
-1
secnum,1    ! reset the section ID to default
MAT,47 $ TYPE,47 $ REAL,46 $ SECNUM,47 $ ESYS,0    ! ELEMNODES = 8
eblock,21,COMPACT,,1
(21i9)
    27928    13801    13802    13800    13799    14646    14645    14643    14644
-1
secnum,1    ! reset the section ID to default
keyo,cid,8,2               ! auto create asymmetric contact (from Program Controlled setting)
keyo,cid,10,0              ! adjust contact stiffness each NR iteration (from Program Controlled setting)
keyo,cid,12,5              ! bonded always
keyo,cid,18,1              ! small sliding turned on by application
keyo,cid,2,2               ! MPC for bonded contacts (from Program Controlled setting)
keyo,tid,5,4               ! Force Distributed Constraint, All Directions
keyo,cid,4,2               ! on nodal point - normal to target surface (from Program Controlled setting)
keyo,cid,9,1               ! ignore initial gaps/penetration
keyo,cid,7,0               ! No Prediction
rmod,tid,3,10.      ! FKN
rmod,tid,5,0.       ! ICONT
rmod,tid,6,-3.06534120792262e-003       ! PINB
rmod,tid,10,0.      ! CNOF
rmod,tid,12,0.      ! FKT
rmod,tid,36,490     ! WB DSID
rmod,cid,3,10.      ! FKN
rmod,cid,5,0.       ! ICONT
rmod,cid,6,-3.06534120792262e-003       ! PINB
rmod,cid,10,0.      ! CNOF
rmod,cid,12,0.      ! FKT
rmod,cid,36,490     ! WB DSID
nsel,all
esel,all
/com,*********** Fixed Supports ***********
CMBLOCK,_FIXEDSU,NODE,        2
(8i10)
      6483     -6569
cmsel,s,_FIXEDSU
d,all,all
nsel,all
/com,*********** Define Pressure Vector Using Surface Effect Elements ***********
local,12,0,0.,0.,0.,0.,0.,0.
csys,0
et,48,154
MAT,48 $ TYPE,48 $ REAL,48 $ SECNUM,48 $ ESYS,12    ! ELEMNODES = 4
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esel,s,type,,48
keyop,48,2,1        ! Apply load in local coordinate system
keyop,48,7,0        ! Use deformed area for application of load
esel,all
et,49,14  ! spring element type
/com,*********** Construct Weak Springs, Prototype 1 ***********
*set,_delta,6.1306681677335e-002
type,49
mat,50
real,50
r,50,0.454790296123136
nsel,all
*get,_nspr,ndmx
_nspr=_nspr+1
esel,s,type,,1
nsle,s,active
*get,_minx,node,0,mnloc,x
*get,_miny,node,0,mnloc,y
*get,_minz,node,0,mnloc,z
*get,_maxx,node,0,mxloc,x
*get,_maxy,node,0,mxloc,y
*get,_maxz,node,0,mxloc,z
*dim,_ntets,arra,8
_ntets(1) = NODE(_minx,_miny,_minz)
_ntets(2) = NODE(_minx,_miny,_maxz)
_ntets(3) = NODE(_minx,_maxy,_minz)
_ntets(4) = NODE(_minx,_maxy,_maxz)
_ntets(5) = NODE(_maxx,_miny,_minz)
_ntets(6) = NODE(_maxx,_miny,_maxz)
_ntets(7) = NODE(_maxx,_maxy,_minz)
_ntets(8) = NODE(_maxx,_maxy,_maxz)
*do,_i,1,8
  n,_nspr,nx(_ntets(_i))+_delta,ny(_ntets(_i)),nz(_ntets(_i))
  e,_ntets(_i),_nspr
  d,_nspr,all
  _nspr=_nspr+1
  n,_nspr,nx(_ntets(_i)),ny(_ntets(_i))+_delta,nz(_ntets(_i))
  e,_ntets(_i),_nspr
  d,_nspr,all
  _nspr=_nspr+1
  n,_nspr,nx(_ntets(_i)),ny(_ntets(_i)),nz(_ntets(_i))+_delta
  e,_ntets(_i),_nspr
  d,_nspr,all
  _nspr=_nspr+1
*enddo
*set,_ntets
nsel,all
esel,all
/com,*********** Construct Weak Springs, Prototype 2 ***********
*set,_delta,1.259028751415e-002
type,49
mat,51
real,51
r,51,0.635588602912561
nsel,all
*get,_nspr,ndmx
_nspr=_nspr+1
esel,s,type,,2
nsle,s,active
*get,_minx,node,0,mnloc,x
*get,_miny,node,0,mnloc,y
*get,_minz,node,0,mnloc,z
*get,_maxx,node,0,mxloc,x
*get,_maxy,node,0,mxloc,y
*get,_maxz,node,0,mxloc,z
*dim,_ntets,arra,8
_ntets(1) = NODE(_minx,_miny,_minz)
_ntets(2) = NODE(_minx,_miny,_maxz)
_ntets(3) = NODE(_minx,_maxy,_minz)
_ntets(4) = NODE(_minx,_maxy,_maxz)
_ntets(5) = NODE(_maxx,_miny,_minz)
_ntets(6) = NODE(_maxx,_miny,_maxz)
_ntets(7) = NODE(_maxx,_maxy,_minz)
_ntets(8) = NODE(_maxx,_maxy,_maxz)
*do,_i,1,8
  n,_nspr,nx(_ntets(_i))+_delta,ny(_ntets(_i)),nz(_ntets(_i))
  e,_ntets(_i),_nspr
  d,_nspr,all
  _nspr=_nspr+1
  n,_nspr,nx(_ntets(_i)),ny(_ntets(_i))+_delta,nz(_ntets(_i))
  e,_ntets(_i),_nspr
  d,_nspr,all
  _nspr=_nspr+1
  n,_nspr,nx(_ntets(_i)),ny(_ntets(_i)),nz(_ntets(_i))+_delta
  e,_ntets(_i),_nspr
  d,_nspr,all
  _nspr=_nspr+1
*enddo
*set,_ntets
nsel,all
esel,all
/com,*********** Construct Weak Springs, Prototype 3 ***********
*set,_delta,1.00722348933307e-002
type,49
mat,52
real,52
r,52,0.657288562582597
nsel,all
*get,_nspr,ndmx
_nspr=_nspr+1
esel,s,type,,3
nsle,s,active
*get,_minx,node,0,mnloc,x
*get,_miny,node,0,mnloc,y
*get,_minz,node,0,mnloc,z
*get,_maxx,node,0,mxloc,x
*get,_maxy,node,0,mxloc,y
*get,_maxz,node,0,mxloc,z
*dim,_ntets,arra,8
_ntets(1) = NODE(_minx,_miny,_minz)
_ntets(2) = NODE(_minx,_miny,_maxz)
_ntets(3) = NODE(_minx,_maxy,_minz)
_ntets(4) = NODE(_minx,_maxy,_maxz)
_ntets(5) = NODE(_maxx,_miny,_minz)
_ntets(6) = NODE(_maxx,_miny,_maxz)
_ntets(7) = NODE(_maxx,_maxy,_minz)
_ntets(8) = NODE(_maxx,_maxy,_maxz)
*do,_i,1,8
  n,_nspr,nx(_ntets(_i))+_delta,ny(_ntets(_i)),nz(_ntets(_i))
  e,_ntets(_i),_nspr
  d,_nspr,all
  _nspr=_nspr+1
  n,_nspr,nx(_ntets(_i)),ny(_ntets(_i))+_delta,nz(_ntets(_i))
  e,_ntets(_i),_nspr
  d,_nspr,all
  _nspr=_nspr+1
  n,_nspr,nx(_ntets(_i)),ny(_ntets(_i)),nz(_ntets(_i))+_delta
  e,_ntets(_i),_nspr
  d,_nspr,all
  _nspr=_nspr+1
*enddo
*set,_ntets
nsel,all
esel,all
/com,*********** Construct Weak Springs, Prototype 4 ***********
*set,_delta,1.23632053039441e-002
type,49
mat,53
real,53
r,53,0.350877198849826
nsel,all
*get,_nspr,ndmx
_nspr=_nspr+1
esel,s,type,,4
nsle,s,active
*get,_minx,node,0,mnloc,x
*get,_miny,node,0,mnloc,y
*get,_minz,node,0,mnloc,z
*get,_maxx,node,0,mxloc,x
*get,_maxy,node,0,mxloc,y
*get,_maxz,node,0,mxloc,z
*dim,_ntets,arra,8
_ntets(1) = NODE(_minx,_miny,_minz)
_ntets(2) = NODE(_minx,_miny,_maxz)
_ntets(3) = NODE(_minx,_maxy,_minz)
_ntets(4) = NODE(_minx,_maxy,_maxz)
_ntets(5) = NODE(_maxx,_miny,_minz)
_ntets(6) = NODE(_maxx,_miny,_maxz)
_ntets(7) = NODE(_maxx,_maxy,_minz)
_ntets(8) = NODE(_maxx,_maxy,_maxz)
*do,_i,1,8
  n,_nspr,nx(_ntets(_i))+_delta,ny(_ntets(_i)),nz(_ntets(_i))
  e,_ntets(_i),_nspr
  d,_nspr,all
  _nspr=_nspr+1
  n,_nspr,nx(_ntets(_i)),ny(_ntets(_i))+_delta,nz(_ntets(_i))
  e,_ntets(_i),_nspr
  d,_nspr,all
  _nspr=_nspr+1
  n,_nspr,nx(_ntets(_i)),ny(_ntets(_i)),nz(_ntets(_i))+_delta
  e,_ntets(_i),_nspr
  d,_nspr,all
  _nspr=_nspr+1
*enddo
*set,_ntets
nsel,all
esel,all
/com,*********** Construct Weak Springs, Prototype 5 ***********
*set,_delta,1.21344416905843e-002
type,49
mat,54
real,54
r,54,0.350535300642009
nsel,all
*get,_nspr,ndmx
_nspr=_nspr+1
esel,s,type,,5
nsle,s,active
*get,_minx,node,0,mnloc,x
*get,_miny,node,0,mnloc,y
*get,_minz,node,0,mnloc,z
*get,_maxx,node,0,mxloc,x
*get,_maxy,node,0,mxloc,y
*get,_maxz,node,0,mxloc,z
*dim,_ntets,arra,8
_ntets(1) = NODE(_minx,_miny,_minz)
_ntets(2) = NODE(_minx,_miny,_maxz)
_ntets(3) = NODE(_minx,_maxy,_minz)
_ntets(4) = NODE(_minx,_maxy,_maxz)
_ntets(5) = NODE(_maxx,_miny,_minz)
_ntets(6) = NODE(_maxx,_miny,_maxz)
_ntets(7) = NODE(_maxx,_maxy,_minz)
_ntets(8) = NODE(_maxx,_maxy,_maxz)
*do,_i,1,8
  n,_nspr,nx(_ntets(_i))+_delta,ny(_ntets(_i)),nz(_ntets(_i))
  e,_ntets(_i),_nspr
  d,_nspr,all
  _nspr=_nspr+1
  n,_nspr,nx(_ntets(_i)),ny(_ntets(_i))+_delta,nz(_ntets(_i))
  e,_ntets(_i),_nspr
  d,_nspr,all
  _nspr=_nspr+1
  n,_nspr,nx(_ntets(_i)),ny(_ntets(_i)),nz(_ntets(_i))+_delta
  e,_ntets(_i),_nspr
  d,_nspr,all
  _nspr=_nspr+1
*enddo
*set,_ntets
nsel,all
esel,all
/com,*********** Construct Weak Springs, Prototype 6 ***********
*set,_delta,1.19055638205242e-002
type,49
mat,55
real,55
r,55,0.350259112322116
nsel,all
*get,_nspr,ndmx
_nspr=_nspr+1
esel,s,type,,6
nsle,s,active
*get,_minx,node,0,mnloc,x
*get,_miny,node,0,mnloc,y
*get,_minz,node,0,mnloc,z
*get,_maxx,node,0,mxloc,x
*get,_maxy,node,0,mxloc,y
*get,_maxz,node,0,mxloc,z
*dim,_ntets,arra,8
_ntets(1) = NODE(_minx,_miny,_minz)
_ntets(2) = NODE(_minx,_miny,_maxz)
_ntets(3) = NODE(_minx,_maxy,_minz)
_ntets(4) = NODE(_minx,_maxy,_maxz)
_ntets(5) = NODE(_maxx,_miny,_minz)
_ntets(6) = NODE(_maxx,_miny,_maxz)
_ntets(7) = NODE(_maxx,_maxy,_minz)
_ntets(8) = NODE(_maxx,_maxy,_maxz)
*do,_i,1,8
  n,_nspr,nx(_ntets(_i))+_delta,ny(_ntets(_i)),nz(_ntets(_i))
  e,_ntets(_i),_nspr
  d,_nspr,all
  _nspr=_nspr+1
  n,_nspr,nx(_ntets(_i)),ny(_ntets(_i))+_delta,nz(_ntets(_i))
  e,_ntets(_i),_nspr
  d,_nspr,all
  _nspr=_nspr+1
  n,_nspr,nx(_ntets(_i)),ny(_ntets(_i)),nz(_ntets(_i))+_delta
  e,_ntets(_i),_nspr
  d,_nspr,all
  _nspr=_nspr+1
*enddo
*set,_ntets
nsel,all
esel,all
/com,*********** Construct Weak Springs, Prototype 7 ***********
*set,_delta,1.16764177045332e-002
type,49
mat,56
real,56
r,56,0.352278519242663
nsel,all
*get,_nspr,ndmx
_nspr=_nspr+1
esel,s,type,,7
nsle,s,active
*get,_minx,node,0,mnloc,x
*get,_miny,node,0,mnloc,y
*get,_minz,node,0,mnloc,z
*get,_maxx,node,0,mxloc,x
*get,_maxy,node,0,mxloc,y
*get,_maxz,node,0,mxloc,z
*dim,_ntets,arra,8
_ntets(1) = NODE(_minx,_miny,_minz)
_ntets(2) = NODE(_minx,_miny,_maxz)
_ntets(3) = NODE(_minx,_maxy,_minz)
_ntets(4) = NODE(_minx,_maxy,_maxz)
_ntets(5) = NODE(_maxx,_miny,_minz)
_ntets(6) = NODE(_maxx,_miny,_maxz)
_ntets(7) = NODE(_maxx,_maxy,_minz)
_ntets(8) = NODE(_maxx,_maxy,_maxz)
*do,_i,1,8
  n,_nspr,nx(_ntets(_i))+_delta,ny(_ntets(_i)),nz(_ntets(_i))
  e,_ntets(_i),_nspr
  d,_nspr,all
  _nspr=_nspr+1
  n,_nspr,nx(_ntets(_i)),ny(_ntets(_i))+_delta,nz(_ntets(_i))
  e,_ntets(_i),_nspr
  d,_nspr,all
  _nspr=_nspr+1
  n,_nspr,nx(_ntets(_i)),ny(_ntets(_i)),nz(_ntets(_i))+_delta
  e,_ntets(_i),_nspr
  d,_nspr,all
  _nspr=_nspr+1
*enddo
*set,_ntets
nsel,all
esel,all
/com,*********** Construct Weak Springs, Prototype 8 ***********
*set,_delta,1.14475885700787e-002
type,49
mat,57
real,57
r,57,0.349915696220666
nsel,all
*get,_nspr,ndmx
_nspr=_nspr+1
esel,s,type,,8
nsle,s,active
*get,_minx,node,0,mnloc,x
*get,_miny,node,0,mnloc,y
*get,_minz,node,0,mnloc,z
*get,_maxx,node,0,mxloc,x
*get,_maxy,node,0,mxloc,y
*get,_maxz,node,0,mxloc,z
*dim,_ntets,arra,8
_ntets(1) = NODE(_minx,_miny,_minz)
_ntets(2) = NODE(_minx,_miny,_maxz)
_ntets(3) = NODE(_minx,_maxy,_minz)
_ntets(4) = NODE(_minx,_maxy,_maxz)
_ntets(5) = NODE(_maxx,_miny,_minz)
_ntets(6) = NODE(_maxx,_miny,_maxz)
_ntets(7) = NODE(_maxx,_maxy,_minz)
_ntets(8) = NODE(_maxx,_maxy,_maxz)
*do,_i,1,8
  n,_nspr,nx(_ntets(_i))+_delta,ny(_ntets(_i)),nz(_ntets(_i))
  e,_ntets(_i),_nspr
  d,_nspr,all
  _nspr=_nspr+1
  n,_nspr,nx(_ntets(_i)),ny(_ntets(_i))+_delta,nz(_ntets(_i))
  e,_ntets(_i),_nspr
  d,_nspr,all
  _nspr=_nspr+1
  n,_nspr,nx(_ntets(_i)),ny(_ntets(_i)),nz(_ntets(_i))+_delta
  e,_ntets(_i),_nspr
  d,_nspr,all
  _nspr=_nspr+1
*enddo
*set,_ntets
nsel,all
esel,all
/com,*********** Construct Weak Springs, Prototype 9 ***********
*set,_delta,1.12186553527178e-002
type,49
mat,58
real,58
r,58,0.352282101468119
nsel,all
*get,_nspr,ndmx
_nspr=_nspr+1
esel,s,type,,9
nsle,s,active
*get,_minx,node,0,mnloc,x
*get,_miny,node,0,mnloc,y
*get,_minz,node,0,mnloc,z
*get,_maxx,node,0,mxloc,x
*get,_maxy,node,0,mxloc,y
*get,_maxz,node,0,mxloc,z
*dim,_ntets,arra,8
_ntets(1) = NODE(_minx,_miny,_minz)
_ntets(2) = NODE(_minx,_miny,_maxz)
_ntets(3) = NODE(_minx,_maxy,_minz)
_ntets(4) = NODE(_minx,_maxy,_maxz)
_ntets(5) = NODE(_maxx,_miny,_minz)
_ntets(6) = NODE(_maxx,_miny,_maxz)
_ntets(7) = NODE(_maxx,_maxy,_minz)
_ntets(8) = NODE(_maxx,_maxy,_maxz)
*do,_i,1,8
  n,_nspr,nx(_ntets(_i))+_delta,ny(_ntets(_i)),nz(_ntets(_i))
  e,_ntets(_i),_nspr
  d,_nspr,all
  _nspr=_nspr+1
  n,_nspr,nx(_ntets(_i)),ny(_ntets(_i))+_delta,nz(_ntets(_i))
  e,_ntets(_i),_nspr
  d,_nspr,all
  _nspr=_nspr+1
  n,_nspr,nx(_ntets(_i)),ny(_ntets(_i)),nz(_ntets(_i))+_delta
  e,_ntets(_i),_nspr
  d,_nspr,all
  _nspr=_nspr+1
*enddo
*set,_ntets
nsel,all
esel,all
/com,*********** Construct Weak Springs, Prototype 10 ***********
*set,_delta,1.09897452868011e-002
type,49
mat,59
real,59
r,59,0.352437499113309
nsel,all
*get,_nspr,ndmx
_nspr=_nspr+1
esel,s,type,,10
nsle,s,active
*get,_minx,node,0,mnloc,x
*get,_miny,node,0,mnloc,y
*get,_minz,node,0,mnloc,z
*get,_maxx,node,0,mxloc,x
*get,_maxy,node,0,mxloc,y
*get,_maxz,node,0,mxloc,z
*dim,_ntets,arra,8
_ntets(1) = NODE(_minx,_miny,_minz)
_ntets(2) = NODE(_minx,_miny,_maxz)
_ntets(3) = NODE(_minx,_maxy,_minz)
_ntets(4) = NODE(_minx,_maxy,_maxz)
_ntets(5) = NODE(_maxx,_miny,_minz)
_ntets(6) = NODE(_maxx,_miny,_maxz)
_ntets(7) = NODE(_maxx,_maxy,_minz)
_ntets(8) = NODE(_maxx,_maxy,_maxz)
*do,_i,1,8
  n,_nspr,nx(_ntets(_i))+_delta,ny(_ntets(_i)),nz(_ntets(_i))
  e,_ntets(_i),_nspr
  d,_nspr,all
  _nspr=_nspr+1
  n,_nspr,nx(_ntets(_i)),ny(_ntets(_i))+_delta,nz(_ntets(_i))
  e,_ntets(_i),_nspr
  d,_nspr,all
  _nspr=_nspr+1
  n,_nspr,nx(_ntets(_i)),ny(_ntets(_i)),nz(_ntets(_i))+_delta
  e,_ntets(_i),_nspr
  d,_nspr,all
  _nspr=_nspr+1
*enddo
*set,_ntets
nsel,all
esel,all
/com,*********** Construct Weak Springs, Prototype 11 ***********
*set,_delta,1.07608560643171e-002
type,49
mat,60
real,60
r,60,0.350084404548499
nsel,all
*get,_nspr,ndmx
_nspr=_nspr+1
esel,s,type,,11
nsle,s,active
*get,_minx,node,0,mnloc,x
*get,_miny,node,0,mnloc,y
*get,_minz,node,0,mnloc,z
*get,_maxx,node,0,mxloc,x
*get,_maxy,node,0,mxloc,y
*get,_maxz,node,0,mxloc,z
*dim,_ntets,arra,8
_ntets(1) = NODE(_minx,_miny,_minz)
_ntets(2) = NODE(_minx,_miny,_maxz)
_ntets(3) = NODE(_minx,_maxy,_minz)
_ntets(4) = NODE(_minx,_maxy,_maxz)
_ntets(5) = NODE(_maxx,_miny,_minz)
_ntets(6) = NODE(_maxx,_miny,_maxz)
_ntets(7) = NODE(_maxx,_maxy,_minz)
_ntets(8) = NODE(_maxx,_maxy,_maxz)
*do,_i,1,8
  n,_nspr,nx(_ntets(_i))+_delta,ny(_ntets(_i)),nz(_ntets(_i))
  e,_ntets(_i),_nspr
  d,_nspr,all
  _nspr=_nspr+1
  n,_nspr,nx(_ntets(_i)),ny(_ntets(_i))+_delta,nz(_ntets(_i))
  e,_ntets(_i),_nspr
  d,_nspr,all
  _nspr=_nspr+1
  n,_nspr,nx(_ntets(_i)),ny(_ntets(_i)),nz(_ntets(_i))+_delta
  e,_ntets(_i),_nspr
  d,_nspr,all
  _nspr=_nspr+1
*enddo
*set,_ntets
nsel,all
esel,all
/com,*********** Construct Weak Springs, Prototype 12 ***********
*set,_delta,1.05318632760254e-002
type,49
mat,61
real,61
r,61,0.345095449837067
nsel,all
*get,_nspr,ndmx
_nspr=_nspr+1
esel,s,type,,12
nsle,s,active
*get,_minx,node,0,mnloc,x
*get,_miny,node,0,mnloc,y
*get,_minz,node,0,mnloc,z
*get,_maxx,node,0,mxloc,x
*get,_maxy,node,0,mxloc,y
*get,_maxz,node,0,mxloc,z
*dim,_ntets,arra,8
_ntets(1) = NODE(_minx,_miny,_minz)
_ntets(2) = NODE(_minx,_miny,_maxz)
_ntets(3) = NODE(_minx,_maxy,_minz)
_ntets(4) = NODE(_minx,_maxy,_maxz)
_ntets(5) = NODE(_maxx,_miny,_minz)
_ntets(6) = NODE(_maxx,_miny,_maxz)
_ntets(7) = NODE(_maxx,_maxy,_minz)
_ntets(8) = NODE(_maxx,_maxy,_maxz)
*do,_i,1,8
  n,_nspr,nx(_ntets(_i))+_delta,ny(_ntets(_i)),nz(_ntets(_i))
  e,_ntets(_i),_nspr
  d,_nspr,all
  _nspr=_nspr+1
  n,_nspr,nx(_ntets(_i)),ny(_ntets(_i))+_delta,nz(_ntets(_i))
  e,_ntets(_i),_nspr
  d,_nspr,all
  _nspr=_nspr+1
  n,_nspr,nx(_ntets(_i)),ny(_ntets(_i)),nz(_ntets(_i))+_delta
  e,_ntets(_i),_nspr
  d,_nspr,all
  _nspr=_nspr+1
*enddo
*set,_ntets
nsel,all
esel,all
/com,*********** Construct Weak Springs, Prototype 13 ***********
*set,_delta,1.03031725598869e-002
type,49
mat,62
real,62
r,62,0.350802605496176
nsel,all
*get,_nspr,ndmx
_nspr=_nspr+1
esel,s,type,,13
nsle,s,active
*get,_minx,node,0,mnloc,x
*get,_miny,node,0,mnloc,y
*get,_minz,node,0,mnloc,z
*get,_maxx,node,0,mxloc,x
*get,_maxy,node,0,mxloc,y
*get,_maxz,node,0,mxloc,z
*dim,_ntets,arra,8
_ntets(1) = NODE(_minx,_miny,_minz)
_ntets(2) = NODE(_minx,_miny,_maxz)
_ntets(3) = NODE(_minx,_maxy,_minz)
_ntets(4) = NODE(_minx,_maxy,_maxz)
_ntets(5) = NODE(_maxx,_miny,_minz)
_ntets(6) = NODE(_maxx,_miny,_maxz)
_ntets(7) = NODE(_maxx,_maxy,_minz)
_ntets(8) = NODE(_maxx,_maxy,_maxz)
*do,_i,1,8
  n,_nspr,nx(_ntets(_i))+_delta,ny(_ntets(_i)),nz(_ntets(_i))
  e,_ntets(_i),_nspr
  d,_nspr,all
  _nspr=_nspr+1
  n,_nspr,nx(_ntets(_i)),ny(_ntets(_i))+_delta,nz(_ntets(_i))
  e,_ntets(_i),_nspr
  d,_nspr,all
  _nspr=_nspr+1
  n,_nspr,nx(_ntets(_i)),ny(_ntets(_i)),nz(_ntets(_i))+_delta
  e,_ntets(_i),_nspr
  d,_nspr,all
  _nspr=_nspr+1
*enddo
*set,_ntets
nsel,all
esel,all
/com,*********** Construct Weak Springs, Prototype 14 ***********
*set,_delta,6.00087866201728e-002
type,49
mat,63
real,63
r,63,0.543004034645766
nsel,all
*get,_nspr,ndmx
_nspr=_nspr+1
esel,s,type,,14
nsle,s,active
*get,_minx,node,0,mnloc,x
*get,_miny,node,0,mnloc,y
*get,_minz,node,0,mnloc,z
*get,_maxx,node,0,mxloc,x
*get,_maxy,node,0,mxloc,y
*get,_maxz,node,0,mxloc,z
*dim,_ntets,arra,8
_ntets(1) = NODE(_minx,_miny,_minz)
_ntets(2) = NODE(_minx,_miny,_maxz)
_ntets(3) = NODE(_minx,_maxy,_minz)
_ntets(4) = NODE(_minx,_maxy,_maxz)
_ntets(5) = NODE(_maxx,_miny,_minz)
_ntets(6) = NODE(_maxx,_miny,_maxz)
_ntets(7) = NODE(_maxx,_maxy,_minz)
_ntets(8) = NODE(_maxx,_maxy,_maxz)
*do,_i,1,8
  n,_nspr,nx(_ntets(_i))+_delta,ny(_ntets(_i)),nz(_ntets(_i))
  e,_ntets(_i),_nspr
  d,_nspr,all
  _nspr=_nspr+1
  n,_nspr,nx(_ntets(_i)),ny(_ntets(_i))+_delta,nz(_ntets(_i))
  e,_ntets(_i),_nspr
  d,_nspr,all
  _nspr=_nspr+1
  n,_nspr,nx(_ntets(_i)),ny(_ntets(_i)),nz(_ntets(_i))+_delta
  e,_ntets(_i),_nspr
  d,_nspr,all
  _nspr=_nspr+1
*enddo
*set,_ntets
nsel,all
esel,all
/com,*********** Construct Weak Springs, Prototype 15 ***********
*set,_delta,6.0037405006934e-002
type,49
mat,64
real,64
r,64,0.606367373739037
nsel,all
*get,_nspr,ndmx
_nspr=_nspr+1
esel,s,type,,15
nsle,s,active
*get,_minx,node,0,mnloc,x
*get,_miny,node,0,mnloc,y
*get,_minz,node,0,mnloc,z
*get,_maxx,node,0,mxloc,x
*get,_maxy,node,0,mxloc,y
*get,_maxz,node,0,mxloc,z
*dim,_ntets,arra,8
_ntets(1) = NODE(_minx,_miny,_minz)
_ntets(2) = NODE(_minx,_miny,_maxz)
_ntets(3) = NODE(_minx,_maxy,_minz)
_ntets(4) = NODE(_minx,_maxy,_maxz)
_ntets(5) = NODE(_maxx,_miny,_minz)
_ntets(6) = NODE(_maxx,_miny,_maxz)
_ntets(7) = NODE(_maxx,_maxy,_minz)
_ntets(8) = NODE(_maxx,_maxy,_maxz)
*do,_i,1,8
  n,_nspr,nx(_ntets(_i))+_delta,ny(_ntets(_i)),nz(_ntets(_i))
  e,_ntets(_i),_nspr
  d,_nspr,all
  _nspr=_nspr+1
  n,_nspr,nx(_ntets(_i)),ny(_ntets(_i))+_delta,nz(_ntets(_i))
  e,_ntets(_i),_nspr
  d,_nspr,all
  _nspr=_nspr+1
  n,_nspr,nx(_ntets(_i)),ny(_ntets(_i)),nz(_ntets(_i))+_delta
  e,_ntets(_i),_nspr
  d,_nspr,all
  _nspr=_nspr+1
*enddo
*set,_ntets
nsel,all
esel,all
fini
/com,****************************************************************************
/com,*************************    SOLUTION       ********************************
/com,****************************************************************************
/solu
antype,0                   ! static analysis
_thickRatio=  0     ! Ratio of thick parts in the model
eqsl,sparse,,,,,1
cntr,print,1               ! print out contact info and also make no initial contact an error
dmpoption,emat,no             ! Don't combine emat file for DANSYS
dmpoption,esav,no             ! Don't combine esav file for DANSYS
nldiag,cont,iter           ! print out contact info each equilibrium iteration
rescontrol,,none                 ! Do not keep any restart files
/com,****************************************************
/com,******************* SOLVE FOR LS 1 OF 1 ****************
esel,s,type,,48
nsle
sfe,all,1,pres,1,0.
sfe,all,2,pres,1,0.
sfe,all,3,pres,1,800.
nsel,all
esel,all
nsub,1,1,1
time,1.
outres,erase
outres,all,none
outres,nsol,all,
outres,rsol,all
outres,eangl,all
outres,etmp,all
outres,veng,all
outres,strs,all,
outres,epel,all,
outres,eppl,all,
outres,cont,all,
! *********** WB SOLVE COMMAND ***********
! check interactive state
*get,ANSINTER_,active,,int
*if,ANSINTER_,ne,0,then
/eof
*endif
solve
/com *************** Write FE CONNECTORS *********
CEWRITE,file,ce,,INTE
/com,****************************************************
/com,*************** FINISHED SOLVE FOR LS 1 *************
fini
*get,_NSOLTHREADS,active,0,ntfs
*get,_NSOLPROCESSES,active,0,npfs
/post1
fini
